$PROBLEM too many sim sources
$INPUT ID TIME DV
$DATA data.csv IGNORE=@
$PRED
  Y = THETA(1) + EPS(1)
$THETA 1
$SIGMA 1
$SIM (804831 123) (1234 4321) (804 831) (621) (0217 123) CLOCKSEED=1 ONLYSIM SUBPROBLEMS=1
