Tue Aug 19 13:38:06 CEST 2025
$PROBLEM RUN# 2 - 2cmpt model - no BQLs
$INPUT C ID TIME DV AMT EVID AGE WT MDV
$DATA /home/vincent/Code/a2-ai/pharos/components/nonmem/models/BQL/nobqldata.csv IGNORE=C
$SUBROUTINES ADVAN4 TRANS4
$PK
 TVCL = THETA(1)*(WT/70)**THETA(6)
  CL   = TVCL * EXP(ETA(1))

  TVV2  = THETA(2)*(WT/70)**THETA(7)
  V2    = TVV2 * EXP(ETA(2))

  TVV3 = THETA(3)*(WT/70)**THETA(8)
  V3   = TVV3

  TVQ  = THETA(4)*(WT/70)**THETA(9)
  Q    = TVQ

  KA=THETA(5)*EXP(ETA(3))
  S2=V2/1000
  K=CL/V2
  K23=Q/V2
  K32=Q/V3
  SUM=K23+K32+K
  SSUM=SQRT(SUM*SUM-4*K*K32)
  ALPH=0.5*(SUM+SSUM)
  BETA=0.5*(SUM-SSUM)
  HLAL=0.693/ALPH
  HLBE=0.693/BETA

$ERROR
     IPRED = F
   Y = F*EXP(ERR(1))
  $THETA
  (0, 26);       1    CLF
  (0, 280);      2    V2F
  (0, 300);      3    V3F
  (0,  60)  ; 4    QF
  (0, 1.5)   ; 5    KA
  (0.75 FIX)      ; 6 POW_CL
  (1 FIX)         ; 7 POW_V2
  (1 FIX)         ; 8 POW_V3
  (0.75 FIX)      ; 9 POW_Q
$OMEGA .10
$OMEGA .04
$OMEGA .01
$SIGMA 0.0025 ; pro res error
$COV PRINT=E
$EST MAXEVAL=9999 METHOD=1 INTER PRINT=5 MSFO=2.MSF
$TABLE ID TIME AMT EVID IPRED AGE WT MDV ONEHEADER NOPRINT FILE=2.TAB
$TABLE ID TIME AMT EVID AGE WT MDV  KA CL V2 V3 Q BETA HLBE
ONEHEADER NOPRINT FILE=2par.TAB

NM-TRAN MESSAGES
 WARNINGS AND ERRORS (IF ANY) FOR PROBLEM    1
 (WARNING  2) NM-TRAN INFERS THAT THE DATA ARE POPULATION.
 LIM VALUES MAXLIM ASSESSED BY NMTRAN: 1,2,3,4,5,6,7,8,10,11,13,15,16
Note: Analytical 2nd Derivatives are constructed in FSUBS but are never used.
      You may insert $ABBR DERIV2=NO after the first $PROB to save FSUBS construction and compilation time

1NONLINEAR MIXED EFFECTS MODEL PROGRAM (NONMEM) VERSION 7.6.0 (nm760)
 ORIGINALLY DEVELOPED BY STUART BEAL, LEWIS SHEINER, AND ALISON BOECKMANN
 CURRENT DEVELOPERS ARE ROBERT BAUER, ICON DEVELOPMENT SOLUTIONS,
 AND ALISON BOECKMANN. IMPLEMENTATION, EFFICIENCY, AND STANDARDIZATION
 PERFORMED BY NOUS INFOSYSTEMS.
 PROBLEM NO.:         1
 RUN# 2 - 2cmpt model - no BQLs
 TOT. NO. OF OBS RECS:     2702
 TOT. NO. OF INDIVIDUALS:      193
 TWO COMPARTMENT MODEL WITH FIRST-ORDER ABSORPTION (ADVAN4)
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 #TBLN:      1
 #METH: First Order Conditional Estimation with Interaction
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
 #TERM:
0MINIMIZATION SUCCESSFUL
 NO. OF FUNCTION EVALUATIONS USED:      208
 NO. OF SIG. DIGITS IN FINAL EST.:  3.8

 ETABAR IS THE ARITHMETIC MEAN OF THE ETA-ESTIMATES,
 AND THE P-VALUE IS GIVEN FOR THE NULL HYPOTHESIS THAT THE TRUE MEAN IS 0.

 ETABAR:         8.0160E-04 -2.1894E-04 -3.0865E-04
 SE:             2.2680E-02  1.3341E-02  6.1861E-03
 N:                     193         193         193

 P VAL.:         9.7181E-01  9.8691E-01  9.6021E-01

 ETASHRINKSD(%)  6.6620E-01  2.3173E+00  1.8695E+01
 ETASHRINKVR(%)  1.3280E+00  4.5809E+00  3.3895E+01
 EBVSHRINKSD(%)  4.9254E-01  2.1486E+00  1.8703E+01
 EBVSHRINKVR(%)  9.8266E-01  4.2510E+00  3.3907E+01
 RELATIVEINF(%)  9.8989E+01  9.4308E+01  6.5084E+01
 EPSSHRINKSD(%)  9.7027E+00
 EPSSHRINKVR(%)  1.8464E+01


 TOTAL DATA POINTS NORMALLY DISTRIBUTED (N):         2702
 N*LOG(2PI) CONSTANT TO OBJECTIVE FUNCTION:    4965.9438334380511
 OBJECTIVE FUNCTION VALUE WITHOUT CONSTANT:   -14346.006029782569
 OBJECTIVE FUNCTION VALUE WITH CONSTANT:      -9380.0621963445192
 REPORTED OBJECTIVE FUNCTION DOES NOT CONTAIN CONSTANT

 TOTAL EFFECTIVE ETAS (NIND*NETA):                           579


 #TERE:
 Elapsed estimation  time in seconds:     2.36
 Elapsed covariance  time in seconds:     2.54
 Elapsed postprocess time in seconds:     0.02

 ********************               FIRST ORDER CONDITIONAL ESTIMATION WITH INTERACTION              ********************
 #OBJT:**************                       MINIMUM VALUE OF OBJECTIVE FUNCTION                      ********************
 #OBJV:********************************************        -14346.006       *********************************************

 ********************               FIRST ORDER CONDITIONAL ESTIMATION WITH INTERACTION              ********************
 ********************                             FINAL PARAMETER ESTIMATE                           ********************

 THETA - VECTOR OF FIXED EFFECTS PARAMETERS   *********
         TH 1      TH 2      TH 3      TH 4      TH 5      TH 6      TH 7      TH 8      TH 9
         2.65E+01  2.83E+02  2.97E+02  5.87E+01  1.51E+00  7.50E-01  1.00E+00  1.00E+00  7.50E-01

 OMEGA - COV MATRIX FOR RANDOM EFFECTS - ETAS  ********
         ETA1      ETA2      ETA3
 ETA1
+        1.01E-01
 ETA2
+        0.00E+00  3.60E-02
 ETA3
+        0.00E+00  0.00E+00  1.12E-02

 SIGMA - COV MATRIX FOR RANDOM EFFECTS - EPSILONS  ****
         EPS1
 EPS1
+        2.45E-03

 OMEGA - CORR MATRIX FOR RANDOM EFFECTS - ETAS  *******
         ETA1      ETA2      ETA3
 ETA1
+        3.17E-01
 ETA2
+        0.00E+00  1.90E-01
 ETA3
+        0.00E+00  0.00E+00  1.06E-01

 SIGMA - CORR MATRIX FOR RANDOM EFFECTS - EPSILONS  ***
         EPS1
 EPS1
+        4.95E-02

 ********************               FIRST ORDER CONDITIONAL ESTIMATION WITH INTERACTION              ********************
 ********************                            STANDARD ERROR OF ESTIMATE                          ********************

 THETA - VECTOR OF FIXED EFFECTS PARAMETERS   *********
         TH 1      TH 2      TH 3      TH 4      TH 5      TH 6      TH 7      TH 8      TH 9
        ......... ......... ......... ......... ......... ......... ......... ......... .........

 OMEGA - COV MATRIX FOR RANDOM EFFECTS - ETAS  ********
         ETA1      ETA2      ETA3
 ETA1
+       .........
 ETA2
+       ......... .........
 ETA3
+       ......... ......... .........

 SIGMA - COV MATRIX FOR RANDOM EFFECTS - EPSILONS  ****
         EPS1
 EPS1
+       .........

 OMEGA - CORR MATRIX FOR RANDOM EFFECTS - ETAS  *******
         ETA1      ETA2      ETA3
 ETA1
+       .........
 ETA2
+       ......... .........
 ETA3
+       ......... ......... .........

 SIGMA - CORR MATRIX FOR RANDOM EFFECTS - EPSILONS  ***
         EPS1
 EPS1
+       .........

 ********************               FIRST ORDER CONDITIONAL ESTIMATION WITH INTERACTION              ********************
 ********************                          COVARIANCE MATRIX OF ESTIMATE                         ********************

            TH 1      TH 2      TH 3      TH 4      TH 5      TH 6      TH 7      TH 8      TH 9      OM11      OM12      OM13
             OM22      OM23      OM33      SG11
 TH 1
+       .........
 TH 2
+       ......... .........
 TH 3
+       ......... ......... .........
 TH 4
+       ......... ......... ......... .........
 TH 5
+       ......... ......... ......... ......... .........
 TH 6
+       ......... ......... ......... ......... ......... .........
 TH 7
+       ......... ......... ......... ......... ......... ......... .........
 TH 8
+       ......... ......... ......... ......... ......... ......... ......... .........
 TH 9
+       ......... ......... ......... ......... ......... ......... ......... ......... .........
 OM11
+       ......... ......... ......... ......... ......... ......... ......... ......... ......... .........
 OM12
+       ......... ......... ......... ......... ......... ......... ......... ......... ......... ......... .........
 OM13
+       ......... ......... ......... ......... ......... ......... ......... ......... ......... ......... ......... .........
 OM22
+       ......... ......... ......... ......... ......... ......... ......... ......... ......... ......... ......... .........
         .........
 OM23
+       ......... ......... ......... ......... ......... ......... ......... ......... ......... ......... ......... .........
         ......... .........
 OM33
+       ......... ......... ......... ......... ......... ......... ......... ......... ......... ......... ......... .........
         ......... ......... .........
 SG11
+       ......... ......... ......... ......... ......... ......... ......... ......... ......... ......... ......... .........
         ......... ......... ......... .........

 ********************               FIRST ORDER CONDITIONAL ESTIMATION WITH INTERACTION              ********************
 ********************                          CORRELATION MATRIX OF ESTIMATE                        ********************

            TH 1      TH 2      TH 3      TH 4      TH 5      TH 6      TH 7      TH 8      TH 9      OM11      OM12      OM13
             OM22      OM23      OM33      SG11
 TH 1
+        0.00E+00
 TH 2
+        0.00E+00  0.00E+00
 TH 3
+        0.00E+00  0.00E+00  0.00E+00
 TH 4
+        0.00E+00  0.00E+00  0.00E+00  0.00E+00
 TH 5
+        0.00E+00  0.00E+00  0.00E+00  0.00E+00  0.00E+00
 TH 6
+       ......... ......... ......... ......... ......... .........
 TH 7
+       ......... ......... ......... ......... ......... ......... .........
 TH 8
+       ......... ......... ......... ......... ......... ......... ......... .........
 TH 9
+       ......... ......... ......... ......... ......... ......... ......... ......... .........
 OM11
+        0.00E+00  0.00E+00  0.00E+00  0.00E+00  0.00E+00 ......... ......... ......... .........  0.00E+00
 OM12
+       ......... ......... ......... ......... ......... ......... ......... ......... ......... ......... .........
 OM13
+       ......... ......... ......... ......... ......... ......... ......... ......... ......... ......... ......... .........
 OM22
+        0.00E+00  0.00E+00  0.00E+00  0.00E+00  0.00E+00 ......... ......... ......... .........  0.00E+00 ......... .........
          0.00E+00
 OM23
+       ......... ......... ......... ......... ......... ......... ......... ......... ......... ......... ......... .........
         ......... .........
 OM33
+        0.00E+00  0.00E+00  0.00E+00  0.00E+00  0.00E+00 ......... ......... ......... .........  0.00E+00 ......... .........
          0.00E+00 .........  0.00E+00
 SG11
+        0.00E+00  0.00E+00  0.00E+00  0.00E+00  0.00E+00 ......... ......... ......... .........  0.00E+00 ......... .........
          0.00E+00 .........  0.00E+00  0.00E+00
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
 ********************               FIRST ORDER CONDITIONAL ESTIMATION WITH INTERACTION              ********************
 ********************                      EIGENVALUES OF COR MATRIX OF ESTIMATE                     ********************

             1         2         3         4         5         6         7         8         9
         1.00E+00  1.00E+00  1.00E+00  1.00E+00  1.00E+00  1.00E+00  1.00E+00  1.00E+00  1.00E+00
 Elapsed finaloutput time in seconds:     0.05
 #CPUT: Total CPU Time in Seconds,        4.998
