Fri Sep  4 14:35:44 UTC 2026
$PROBLEM projH 1001 SCM base -- ADVAN5 TRANS1 transit-abs 2-cmt, covariate candidates released created from pharos see projH-1001_vccat4_metadata.json for details.

$INPUT ID TIME AMT CMT EVID MDV DV LLOQ CV14 DOSEA CV1 CV2 CV3 CV4
CV5 CV6 CV7 CV8 CV9 CV10 CV11 CV12 CV13

$DATA /data/user-homes/brendan/projects/scm-demo/data/PK/1001_Sim.csv
	IGNORE=@

$SUBROUTINE ADVAN5 TRANS1

$MODEL
 COMP = (DOSE)
 COMP = (CENTRAL,DEFOBS)
 COMP = (METABOLITE)
 COMP = (TISSUE)
 COMP = (TRANSABS1)
 COMP = (TRANSABS2)

$PK
TVCL = THETA(1)
CL   = TVCL * EXP(ETA(1))
TVVC = THETA(2)
V2   = TVVC * EXP(ETA(2))
TVVP = THETA(3)
V4   = TVVP * EXP(ETA(3))
TVQ  = THETA(4)
Q    = TVQ * EXP(ETA(4))
TVKA = THETA(5)
KA   = TVKA * EXP(ETA(5))
EMAX = THETA(6)
KM   = THETA(7)
HC   = THETA(16)

F1DOS = (EMAX*((DOSEA-4.5)**HC)/((KM**HC)+((DOSEA-4.5)**HC)))

CAT1 = 0
IF(CV8.EQ.2) CAT1=1

CAT2=0
IF(CV10.GE.1.AND.CV14.EQ.102) CAT2=1

CAT3=0
IF(CV12.EQ.2) CAT3=1

CAT4=0
IF(CV12.EQ.1.OR.CV13.EQ.1) CAT4=1

CONT1=70
IF(CV1.GT.0) CONT1=CV1

VCCV1     = (CONT1/70)**THETA(13)
CLCV1     = (CONT1/70)**THETA(14)

KACAT1    = (1+CAT1*THETA(8))
KACAT2  = (1+CAT2*THETA(9))

CLCAT3  = (1+CAT3*THETA(10))
VCCAT3  = (1+CAT3*THETA(15))

CLCAT4 = (1+CAT4*THETA(11))
VCCAT4 = (1+CAT4*THETA(12))

KA=KA*KACAT1*KACAT2
CL=CL*CLCAT3*CLCV1*CLCAT4
V2=V2*VCCV1*VCCAT3*VCCAT4
V4=V4
K15=KA
K56=KA
K62=KA
K24=Q/V2
K42=Q/V4
K20=CL/V2

F1=1*(1+F1DOS)

S2= V2/1000

$ERROR (OBSERVATION ONLY)
IPRED=F
IF(CV11.EQ.0) W = SQRT((IPRED**2)*SIGMA(1,1)+SIGMA(3,3))
IF(CV11.GE.1) W = SQRT((IPRED**2)*SIGMA(2,2)+SIGMA(4,4))

IRES=DV-IPRED
IWRES=IRES/W
IF(CV11.EQ.0) Y=IPRED+IPRED*EPS(1)+EPS(3)
IF(CV11.GE.1) Y=IPRED+IPRED*EPS(2)+EPS(4)

$THETA
(0,122.5)
(0,795.76)
(0,365.38)
(0,19.62)
(0,4.28)
(0,0.93)
(0,7.09)
0.499972
-0.613192
-0.189893
-0.772116
0.1
(0 FIX)
(0 FIX)
(0 FIX)
(0, 2.51)

$OMEGA BLOCK(2)
0.053
0.065
0.094
$OMEGA
0 FIX
0 FIX
0.002

$SIGMA
0.087
0.16
0.009
0 FIX

$EST METHOD=1 INTERACTION MAXEVAL=9999 PRINT=1 NSIG=3 SIGL=9
$TABLE ID TIME EVID MDV IPRED PRED CWRES
NOPRINT NOAPPEND ONEHEADER NOTITLE FILE=sdtab1

NM-TRAN MESSAGES
 WARNINGS AND ERRORS (IF ANY) FOR PROBLEM    1
 (WARNING  2) NM-TRAN INFERS THAT THE DATA ARE POPULATION.
 (WARNING  3) THERE MAY BE AN ERROR IN THE ABBREVIATED CODE. THE FOLLOWING
 ONE OR MORE RANDOM VARIABLES ARE DEFINED WITH "IF" STATEMENTS THAT DO NOT
 PROVIDE DEFINITIONS FOR BOTH THE "THEN" AND "ELSE" CASES. IF ALL
 CONDITIONS FAIL, THE VALUES OF THESE VARIABLES WILL BE ZERO.
   W Y
 (WARNING  79) SIGMA IS USED ON THE RIGHT. WITH A SUBSEQUENT RUN, IF AN
 INITIAL ESTIMATE OF A DIAGONAL BLOCK OF SIGMA IS TO BE COMPUTED BY
 NONMEM, THAT BLOCK WILL BE SET TO AN IDENTITY MATRIX DURING THAT
 COMPUTATION. THIS COULD LEAD TO AN ARITHMETIC EXCEPTION.*
 * THE MAXIMUM NUMBER OF WARNINGS OF ONE OR MORE TYPES WAS REACHED.
 IT IS POSSIBLE THAT SOME WARNING MESSAGES WERE SUPPRESSED.
 LIM VALUES MAXLIM ASSESSED BY NMTRAN: 1,2,3,4,5,6,7,8,10,11,13,15,16
Note: Analytical 2nd Derivatives are constructed in FSUBS but are never used.
      You may insert $ABBR DERIV2=NO after the first $PROB to save FSUBS construction and compilation time

1NONLINEAR MIXED EFFECTS MODEL PROGRAM (NONMEM) VERSION 7.6.0 (nm760)
 ORIGINALLY DEVELOPED BY STUART BEAL, LEWIS SHEINER, AND ALISON BOECKMANN
 CURRENT DEVELOPERS ARE ROBERT BAUER, ICON DEVELOPMENT SOLUTIONS,
 AND ALISON BOECKMANN. IMPLEMENTATION, EFFICIENCY, AND STANDARDIZATION
 PERFORMED BY NOUS INFOSYSTEMS.
 PROBLEM NO.:         1
 projH 1001 SCM base -- ADVAN5 TRANS1 transit-abs 2-cmt, covariate candid
 TOT. NO. OF OBS RECS:     7769
 TOT. NO. OF INDIVIDUALS:      268
 GENERAL LINEAR KINETICS MODEL (ADVAN5)
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 #TBLN:      1
 #METH: First Order Conditional Estimation with Interaction
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
0PRED EXIT CODE = 1
0INDIVIDUAL NO.      96   ID= 9.60000000000000E+01   (WITHIN-INDIVIDUAL) DATA REC NO.   1
 THETA=
  1.29E+02   7.24E+02   3.61E+02   1.95E+01   4.35E+00   9.43E-01   7.00E+00   6.17E-01  -3.44E-01  -5.34E-01
 -9.37E-01  -1.69E+00   0.00E+00   0.00E+00   0.00E+00   2.50E+00
 OCCURS DURING SEARCH FOR ETA AT INITIAL VALUE, ETA=0
 PK PARAMETER FOR OBSERVATION COMPARTMENT'S SCALE IS NON-POSITIVE
0PROGRAM TERMINATED BY OBJ
 MESSAGE ISSUED FROM ESTIMATION STEP

 #TERM:

 TOTAL DATA POINTS NORMALLY DISTRIBUTED (N):         2518
 N*LOG(2PI) CONSTANT TO OBJECTIVE FUNCTION:    4627.7744532187317
 OBJECTIVE FUNCTION VALUE WITHOUT CONSTANT:    32755.263677011812
 OBJECTIVE FUNCTION VALUE WITH CONSTANT:       37383.038130230547
 REPORTED OBJECTIVE FUNCTION DOES NOT CONTAIN CONSTANT

 TOTAL EFFECTIVE ETAS (NIND*NETA):                           285

 #TERE:
 Elapsed estimation  time in seconds:   147.08
 #CPUT: Total CPU Time in Seconds,      147.417
