$PROBLEM scm template (inline covariate effects)
$INPUT ID TIME AMT DV WT CRCL AGE
$DATA data.csv IGNORE=@
$SUBROUTINES ADVAN2 TRANS2
$PK
TVCL = THETA(1) * (WT/70)**THETA(4) * (CRCL/100)**THETA(5)
CL = TVCL * EXP(ETA(1))
V  = THETA(2) * (WT/70)**THETA(6) * EXP(ETA(2))
KA = THETA(3)
S2 = V
$ERROR
Y = F * (1 + EPS(1))
$THETA (0, 3)    ; TVCL (L/h)
$THETA (0, 20)   ; TVV (L)
$THETA (0, 1.2)  ; TVKA (1/h)
$THETA (0 FIX)   ; WT_CL cov
$THETA (0 FIX)   ; CRCL_CL cov
$THETA (0 FIX)   ; WT_V cov
$OMEGA 0.1
$OMEGA 0.1
$SIGMA 0.02
$ESTIMATION METHOD=1 INTER MAXEVAL=9999 NOABORT
$COVARIANCE
