$PROBLEM scm template
$INPUT ID TIME AMT DV WT CRCL AGE
$DATA data.csv IGNORE=@
$SUBROUTINES ADVAN2 TRANS2
$PK
WT_CL = (WT/70)**THETA(4)
CRCL_CL = (CRCL/100)**THETA(5)
WT_V = (WT/70)**THETA(6)
CL = THETA(1) * WT_CL * CRCL_CL * EXP(ETA(1))
V  = THETA(2) * WT_V * EXP(ETA(2))
KA = THETA(3)
S2 = V
$ERROR
Y = F * (1 + EPS(1))
$THETA NAMES(TVCL, TVV, TVKA) (0, 3) (0, 20) (0, 1.2)
$THETA NAMES(WT_CL, CRCL_CL, WT_V) (0 FIX) (0 FIX) (0 FIX)
$OMEGA 0.1
$OMEGA 0.1
$SIGMA 0.02
$ESTIMATION METHOD=1 INTER MAXEVAL=9999 NOABORT
$COVARIANCE
