$PROBLEM scm template ($PRED)
$INPUT ID TIME AMT DV WT CRCL AGE
$DATA data.csv IGNORE=@
$PRED
WT_CL = (WT/70)**THETA(4)
CRCL_CL = (CRCL/100)**THETA(5)
WT_V = (WT/70)**THETA(6)
CL = THETA(1) * WT_CL * CRCL_CL * EXP(ETA(1))
V  = THETA(2) * WT_V * EXP(ETA(2))
KA = THETA(3)
K = CL/V
F = AMT/V * KA/(KA-K) * (EXP(-K*TIME) - EXP(-KA*TIME))
Y = F * (1 + EPS(1))
$THETA (0, 3)    ; TVCL (L/h)
$THETA (0, 20)   ; TVV (L)
$THETA (0, 1.2)  ; TVKA (1/h)
$THETA (0 FIX)   ; WT_CL cov
$THETA (0 FIX)   ; CRCL_CL cov
$THETA (0 FIX)   ; WT_V cov
$OMEGA 0.1
$OMEGA 0.1
$SIGMA 0.02
$ESTIMATION METHOD=1 INTER MAXEVAL=9999 NOABORT
$COVARIANCE
