$SIZES LPAR=100

$PROB prodromal created from pharos see 1vc3_metadata.json for details.

$ABBR DERIV2=NO

$INPUT ID GROUP TIME TAGE DV MDV RCAT CMT IVEN INFL ICSF ICBF IMOC REP VISIT=DROP

$DATA 1.csv
IGNORE=@


$SUBROUTINE ADVAN13 TOL=6

$MODEL
COMP = (VENTRICLE)
COMP = (NFL)
COMP = (CSF1R)
COMP = (CBFS1)
COMP = (MOCA)


$PK


AGEA1 = 0
AGEA2 = 0
AGEA3 = 0
AGEA4 = 0
AGEA5 = 0


IF(GROUP.EQ.2) AGEA1 = THETA(16)
IF(GROUP.EQ.1) AGEA1 = THETA(17)

IF(GROUP.EQ.2) AGEA2 = THETA(18)
IF(GROUP.EQ.1) AGEA2 = THETA(19)

IF(GROUP.EQ.2) AGEA3 = THETA(20)
IF(GROUP.EQ.1) AGEA3 = THETA(21)

IF(GROUP.EQ.2) AGEA4 = THETA(22)
IF(GROUP.EQ.1) AGEA4 = THETA(23)

IF(GROUP.EQ.2) AGEA5 = THETA(24)
IF(GROUP.EQ.1) AGEA5 = THETA(25)


KIN1 = THETA(1) + (THETA(11) + AGEA1)*TAGE/40 * EXP(ETA(1))
KIN2 = THETA(2) + (THETA(12) + AGEA2)*TAGE/40 * EXP(ETA(2))
KIN3 = THETA(3) + (THETA(13) + AGEA3)*TAGE/40 * EXP(ETA(3))
KIN4 = THETA(4) + (THETA(14) + AGEA4)*TAGE/40 * EXP(ETA(4))
KIN5 = THETA(5) + (THETA(15) + AGEA5)*TAGE/40 * EXP(ETA(5))


KOUT1 = THETA(6)
KOUT2 = THETA(7)
KOUT3 = THETA(8)
KOUT4 = THETA(9)
KOUT5 = THETA(10)

EVEN = 0
IF(ID.GT.1000) EVEN = THETA(26) * EXP(ETA(6))
ENFL = 0
IF(ID.GT.1000) ENFL = THETA(27) * EXP(ETA(7))
ECSF = 0
IF(ID.GT.1000) ECSF = THETA(28) * EXP(ETA(8))
ECBF = 0
IF(ID.GT.1000) ECBF = THETA(29) * EXP(ETA(9))
EMOC = 0
IF(ID.GT.1000) EMOC = THETA(30) * EXP(ETA(10))


A_0(1) = KIN1/KOUT1
A_0(2) = KIN2/KOUT2
A_0(3) = KIN3/KOUT3
A_0(4) = KIN4/KOUT4
A_0(5) = KIN5/KOUT5


$DES


DADT(1) = KIN1 * (1 - EVEN)  - KOUT1*A(1)
DADT(2) = KIN2 * (1 - ENFL)  - KOUT2*A(2)
DADT(3) = KIN3 * (1 - ECSF)  - KOUT3*A(3)
DADT(4) = KIN4 * (1 - ECBF)  - KOUT4*A(4)
DADT(5) = KIN5 * (1 + EMOC)  - KOUT5*A(5)


$ERROR

Y = F * (1 + ERR(1))
IF(CMT.EQ.2) Y = F * (1 + ERR(2))
IF(CMT.EQ.3) Y = F * (1 + ERR(3))
IF(CMT.EQ.4) Y = F + ERR(4)
IF(CMT.EQ.5) Y = F + ERR(5)


IPRED = F


$THETA

; KIN
(25 FIX)    ; TH1
(2.21 FIX)    ; TH2
(24500 FIX)    ; TH3
(2.76 FIX)    ; TH4
(27.5 FIX)    ; TH5


; KOUT
(1 FIX)    ; TH6
(1 FIX)    ; TH7
(1 FIX)    ; TH8
(1 FIX)    ; TH9
(1 FIX)    ; TH10


(3.36 FIX )
(15.2 FIX)
(5620 FIX)
(0.859 FIX)
(0.241 FIX)


(29.1 FIX)      ; TH16
(63.0 FIX)      ; TH17

(72.3 FIX)      ; TH18
(-3.12 FIX)      ; TH19

(-8420 FIX)      ; TH20
(30500 FIX)      ; TH21

(19.1 FIX)      ; TH22
(23.3 FIX)      ; TH23

(-5.63 FIX)      ; TH24
(-6.57 FIX)      ; TH25


(0, 0.3, 1)
(0, 0.3, 1)
(0, 0.3, 1)
(0, 0.3, 1)
(0, 0.3, 1)


$OMEGA .1 .1 .1 .1 .1


$OMEGA 0.1 0.1 0.1 0.1 0.1


$SIGMA
0.1 0.1 0.1 0.1 0.1

$EST METHOD=1 INTERACTION PRINT=5 MAX=999999 SIG=3 NOABORT NOOBT
;$EST METHOD=SAEM INTERACTION NBURN=500 NITER=500 PRINT=10 SEED=7354 NOABORT

$COV PRINT = E UNCONDITIONAL MATRIX=S
$TABLE ID TAGE TIME PRED IPRED IVEN INFL ICSF ICBF IMOC EVEN ENFL ECSF ECBF EMOC GROUP RCAT MDV
  ETAS(1:LAST) NOPRINT ONEHEADER FILE=./fit.tab
