$PROBLEM From bbr: see 1a014d01.yaml for details

$ABBR DERIV2=NO

$INPUT C NUM STUDY COHORT ID TIME ATFD ATLD NTFD NTLD DAY OCC EVID CMT AMT DOSEN
      DOSELOC RATE DV LNDV MDV LLOQ BLQ BWT BAGE BALB SEXF RACEN ECOG BCREAT BEGFR BCRCLR ADMS

$DATA ../../data/derived/1a014d01.csv
IGNORE = @

$SUBROUTINE ADVAN6 TRANS 1 TOL=6 ;

$MODEL
COMP = (DEPOT)   ;
COMP = (CENTRAL) ;

$PK
;--- COVARIATES -----------------------
    WTCL = THETA(4)
    COVWTCL=(BWT/70)**WTCL

    WTV = THETA(5)
    COVWTV=(BWT/70)**WTV

    SEXV = THETA(6)
    COVSEXV=1+SEXF*SEXV

    SEXCL = THETA(7)
    COVSEXCL=1+SEXF*SEXCL

;--------------------------

KA=THETA(1)
CL=THETA(2) *COVWTCL *COVSEXCL      *EXP(ETA(1))
V2=THETA(3) *COVWTV  *COVSEXV      *EXP(ETA(2))

F1 = 1      ; Bioavailability

S2 = V2     ;


$DES
CP = A(2)/V2

DADT(1) = -KA*A(1)
DADT(2) = KA*A(1) - (CL/V2)*A(2)


$ERROR
IPRED = F
Y = IPRED*(1+EPS(1)) +EPS(2) ; Combined Additive and Proportional Error

$THETA
(0, 0.5)   ; THETA1 KA {1/Time}
(0,0.6)    ; THETA2 CL {Volume/Time} [CL]
(0,3)      ; THETA3 VC or V2 {Volume} [VC]
(0.75)     ; THETA4. WT on CL
(1)        ; THETA5. WT on V
(0.2)      ; THETA6. SEX on V
(0.1)      ; THETA7. SEX on CL


$OMEGA
0.1       ;1 IIV on CL/F
0.1       ;2 IIV on VC/F

$SIGMA
0.01     ;Proportional Error
0.5       ;Additive Error {Concentration}

$EST MAXEVAL=9999 METHOD=1 INTER SIGL=6 NSIG=3 PRINT=5 MSFO=ModelSpecificFile.msf
$COV PRINT=E MATRIX = R

$TABLE NUM ID TIME EVID MDV BLQ NPDE IPRED CWRES
NOPRINT ONEHEADERALL FILE=run1a014d01.tab

$TABLE ID  KA CL VC=V2 WTCL COVWTCL WTV COVWTV SEXV COVSEXV SEXCL COVSEXCL  ETAS(1:LAST)
NOPRINT NOAPPEND ONEHEADER NOTITLE FIRSTONLY FILE=run1a014d01par.tab
