$PROBLEM From bbr: see 1a015d01.yaml for details

$ABBR DERIV2=NO

$INPUT C NUM STUDY COHORT ID TIME ATFD ATLD NTFD NTLD DAY OCC EVID CMT AMT DOSEN
      DOSELOC RATE DV LNDV MDV LLOQ BLQ BWT BAGE BALB SEXF RACEN ECOG BCREAT BEGFR BCRCLR ADMS

$DATA ../../data/derived/1a015d01.csv
IGNORE = @

$SUBROUTINE ADVAN6 TRANS 1 TOL=6 ;

$MODEL
COMP = (DEPOT)   ;
COMP = (CENTRAL) ;

$PK
;--- COVARIATES -----------------------

    SEXV = THETA(4)
    COVSEXV=1+SEXF*SEXV

    SEXCL = THETA(5)
    COVSEXCL=1+SEXF*SEXCL

;--------------------------

KA=THETA(1)
CL=THETA(2) *COVSEXCL      *EXP(ETA(1))
V2=THETA(3) *COVSEXV       *EXP(ETA(2))

F1 = 1      ; Bioavailability

S2 = V2     ;


$DES
CP = A(2)/V2

DADT(1) = -KA*A(1)
DADT(2) = KA*A(1) - (CL/V2)*A(2)


$ERROR
IPRED = F
Y = IPRED*(1+EPS(1)) +EPS(2) ; Combined Additive and Proportional Error

$THETA
(0, 0.5)   ; THETA1 KA {1/Time}
(0,0.6)    ; THETA2 CL {Volume/Time} [CL]
(0,3)      ; THETA3 VC or V2 {Volume} [VC]
(0,0.2)      ; THETA4. SEX on V
(0,0.1)      ; THETA5. SEX on CL


$OMEGA
0.1       ;1 IIV on CL/F
0.1       ;2 IIV on VC/F

$SIGMA
0.01     ;Proportional Error
0.5       ;Additive Error {Concentration}

$EST MAXEVAL=9999 METHOD=1 INTER SIGL=6 NSIG=3 PRINT=5 MSFO=ModelSpecificFile.msf
$COV PRINT=E MATRIX = R

$TABLE NUM ID TIME EVID MDV BLQ NPDE IPRED CWRES
NOPRINT ONEHEADERALL FILE=1a015d01.tab

$TABLE NUM ID  KA CL VC=V2 SEXV COVSEXV SEXCL COVSEXCL  ETAS(1:LAST)
NOPRINT NOAPPEND ONEHEADER FILE=1a015d01par.tab
