$PROBLEM Base one-compartment oral absorption model

$INPUT ID TIME EVID AMT CMT DV MDV WT SEX

$DATA /data/user-homes/matthews/Packages/hyperion/vignettes/test_data/data/derived/onecmpt-oral-30ind.csv IGNORE=@

$SUBROUTINES ADVAN2 TRANS2

$PK
; Typical values
TVCL = THETA(1)
TVV  = THETA(2)
TVKA = THETA(3)

; Individual parameters
CL = TVCL * EXP(ETA(1))
V  = TVV  * EXP(ETA(2))
KA = TVKA * EXP(ETA(3))

; NONMEM scaling
S2 = V

$ERROR
; Proportional + additive error model (matches mrgsolve)
IPRED = F
Y = IPRED * (1 + EPS(1)) + EPS(2)

$THETA
(0, 1)    ;TVCL (L/hr)
(0, 30)   ;TVV (L)
(0, 1)    ;TVKA (1/hr)

$OMEGA BLOCK(2)
0.1       ;OM1 TVCL :EXP
0.0001    ;OM1,2 TVCL:TVV :EXP
0.1       ;OM2 TVV :EXP
$OMEGA
0.1       ;OM3 TVKA :EXP

$SIGMA
0.04    ; 1. Proportional error (variance, 20% CV)
0.01 FIX ; 2. Additive error (variance, 0.01 mg/L SD)

$ESTIMATION METHOD=1 INTERACTION MAXEVAL=9999 PRINT=5
$COV PRINT=E MATRIX=S
$TABLE ID TIME DV PRED IPRED CWRES NPDE NOAPPEND NOPRINT ONEHEADER FILE=run001.tab
$TABLE ID CL V KA ETAS(1:LAST) NOAPPEND NOPRINT ONEHEADER FIRSTONLY FILE=run001par.tab
