Tue 10/22/2024
04:07 PM
;Model Desc: Two Compartment model with Clearance and
; central volume modeled with covariates age and gender
;Project Name: nm7examples
;Project ID: NO PROJECT DESCRIPTION

$PROB RUN# example2 (from sampc)
$INPUT C SET ID JID TIME DV=CONC AMT=DOSE RATE EVID MDV CMT GNDR AGE
$DATA example2.csv IGNORE=C
$SUBROUTINES ADVAN3 TRANS4

$PK
; LCLM=log transformed clearance, male
LCLM=THETA(1)
;LCLF=log transformed clearance, female.
LCLF=THETA(2)
; CLAM=CL age slope, male
CLAM=THETA(3)
; CLAF=CL age slope, female
CLAF=THETA(4)
; LV1M=log transformed V1, male
LV1M=THETA(5)
; LV1F=log transformed V1, female
LV1F=THETA(6)
; V1AM=V1 age slope, male
V1AM=THETA(7)
; V1AF=V1 age slope, female
V1AF=THETA(8)
; LAGE=log transformed age
LAGE=DLOG(AGE)

;Mean of ETA1, the inter-subject deviation of Clearance,
; is ultimately modeled as linear function of THETA(1) to THETA(4).
; Relating thetas to Mus by linear functions is not essential for
; ITS, IMP, or IMPMAP methods, but is very helpful for MCMC methods
; such as SAEM and BAYES.

MU_1=(1.0-GNDR)*(LCLM+LAGE*CLAM) + GNDR*(LCLF+LAGE*CLAF)

; Mean of ETA2, the inter-subject deviation of V1,
; is ultimately modeled as linear function of THETA(5) to THETA(8)

MU_2=(1.0-GNDR)*(LV1M+LAGE*V1AM) + GNDR*(LV1F+LAGE*V1AF)
MU_3=THETA(9)
MU_4=THETA(10)
CL=DEXP(MU_1+ETA(1))
V1=DEXP(MU_2+ETA(2))
Q=DEXP(MU_3+ETA(3))
V2=DEXP(MU_4+ETA(4))
S1=V1

$ERROR
CALLFL=0
; Option to model the residual error coefficient in THETA(11),
; rather than in SIGMA.
SDSL=THETA(11)
W=F*SDSL
Y = F + W*EPS(1)
IPRED=F
IWRES=(DV-F)/W

;Initial THETAs
$THETA
( 0.7 ) ;[LCLM]
( 0.7 ) ;[LCLF]
( 2 )   ;[CLAM]
( 2.0);[CLAF]
( 0.7 ) ;[LV1M]
( 0.7 ) ;[LV1F]
( 2.0 )   ;[V1AM]
( 2.0 )   ;[V1AF]
( 0.7 ) ;[MU_3]
(  0.7 );[MU_4]
(0.0, 0.3 )     ;[SDSL]

;Initial OMEGAs
$OMEGA BLOCK(4)
0.5  ;[p]
0.001  ;[f]
0.5  ;[p]
0.001 ;[f]
0.001 ;[f]
0.5  ;[p]
0.001 ;[f]
0.001 ;[f]
0.001 ;[f]
0.5 ;[p]

; SIGMA is 1.0 fixed, serves as unscaled variance for EPS(1).
; THETA(11) takes up the residual error scaling.
$SIGMA
(1.0 FIXED)

;Prior information is important for MCMC Bayesian analysis,
; not necessary for maximization methods
; In this example, only the OMEGAs have a prior distribution,
; the THETAS do not.
; For Bayesian methods, it is most important for at least the
; OMEGAs to have a prior, even an uninformative one,
; to stabilize the analysis. Only if the number of subjects
; exceeds the OMEGA dimension number by at least 100,
; then you may get away without priors on OMEGA for BAYES analysis.
$PRIOR NWPRI
; Prior OMEGA matrix
$OMEGAP BLOCK(4) FIX VALUES(0.01,0.0)
; Degrees of freedom to OMEGA prior matrix:
$OMEGAPD 4 FIX

; The first analysis is iterative two-stage.
; Note that the GRD specification is THETA(11) is a
; Sigma-like parameter.  This will allow NONMEM to make
; efficient gradient evaluations for THETA(11), which is useful
; for later IMP,IMPMAP, and SAEM methods, but has no impact on
; ITS and BAYES methods.

$EST METHOD=ITS INTERACTION FILE=example2.ext NITER=1000 NSIG=2
     PRINT=5 NOABORT SIGL=8 NOPRIOR=1 CTYPE=3 GRD=TS(11)

; Results of ITS serve as initial parameters for the IMP method.

$EST METHOD=IMP INTERACTION EONLY=0 MAPITER=0 NITER=100 ISAMPLE=300
     PRINT=1 SIGL=8

; The results of IMP are used as the initial values for the SAEM method.

$EST METHOD=SAEM NBURN=3000 NITER=2000 PRINT=10 ISAMPLE=3
     CTYPE=3 CITER=10 CALPHA=0.05

; After the SAEM method, obtain good estimates of the marginal density
; (objective function),
; along with good estimates of the standard errors.

$EST METHOD=IMP INTERACTION EONLY=1 NITER=5 ISAMPLE=3000
     PRINT=1 SIGL=8 SEED=123334
     CTYPE=3 CITER=10 CALPHA=0.05

; The Bayesian analysis is performed.

$EST METHOD=BAYES INTERACTION FILE=example2.TXT NBURN=10000
     NITER=3000 PRINT=100 NOPRIOR=0
     CTYPE=3 CITER=10 CALPHA=0.05

; Just for old-times sake, lets see what the traditional
; FOCE method will give us.
; And, remember to introduce a new FILE, so its results wont
; append to our Bayesian FILE.

$EST  METHOD=COND INTERACTION MAXEVAL=9999 FILE=example2.ext NSIG=2
  SIGL=14 PRINT=5 NOABORT NOPRIOR=1

$COV MATRIX=R UNCONDITIONAL

NM-TRAN MESSAGES
 WARNINGS AND ERRORS (IF ANY) FOR PROBLEM    1
 (WARNING  2) NM-TRAN INFERS THAT THE DATA ARE POPULATION.
 (MU_WARNING 26) DATA ITEM(S) USED IN DEFINITION OF MU_(S) SHOULD BE CONSTANT FOR INDIV. REC.:
  GNDR AGE
Note: Analytical 2nd Derivatives are constructed in FSUBS but are never used.
      You may insert $ABBR DERIV2=NO after the first $PROB to save FSUBS construction and compilation time

1NONLINEAR MIXED EFFECTS MODEL PROGRAM (NONMEM) VERSION 7.6.0 beta 4 (nm76b4)
 ORIGINALLY DEVELOPED BY STUART BEAL, LEWIS SHEINER, AND ALISON BOECKMANN
 CURRENT DEVELOPERS ARE ROBERT BAUER, ICON DEVELOPMENT SOLUTIONS,
 AND ALISON BOECKMANN. IMPLEMENTATION, EFFICIENCY, AND STANDARDIZATION
 PERFORMED BY NOUS INFOSYSTEMS.
 PROBLEM NO.:         1
 RUN# example2 (from sampc)
 TOT. NO. OF OBS RECS:     2000
 TOT. NO. OF INDIVIDUALS:      400
 TWO COMPARTMENT MODEL (ADVAN3)
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 #TBLN:      1
 #METH: Iterative Two Stage (No Prior)
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
 #TERM:
 OPTIMIZATION WAS COMPLETED

 ETABAR IS THE ARITHMETIC MEAN OF THE ETA-ESTIMATES,
 AND THE P-VALUE IS GIVEN FOR THE NULL HYPOTHESIS THAT THE TRUE MEAN IS 0.

 ETABAR:        -4.7795E-08 -6.0847E-08 -1.1271E-07 -1.0175E-07
 SE:             4.7106E-03  2.9771E-03  2.9246E-03  3.6831E-03
 N:                     400         400         400         400

 P VAL.:         9.9999E-01  9.9998E-01  9.9997E-01  9.9998E-01

 ETASHRINKSD(%)  6.9160E+00  3.3019E+01  4.1116E+01  2.5038E+01
 ETASHRINKVR(%)  1.3354E+01  5.5135E+01  6.5326E+01  4.3807E+01
 EBVSHRINKSD(%)  6.9159E+00  3.3019E+01  4.1114E+01  2.5037E+01
 EBVSHRINKVR(%)  1.3354E+01  5.5135E+01  6.5324E+01  4.3806E+01
 RELATIVEINF(%)  7.7675E+01  4.1768E+01  2.7824E+01  4.1730E+01
 EPSSHRINKSD(%)  2.6119E+01
 EPSSHRINKVR(%)  4.5416E+01


 TOTAL DATA POINTS NORMALLY DISTRIBUTED (N):         2000
 N*LOG(2PI) CONSTANT TO OBJECTIVE FUNCTION:    3675.75413281869
 OBJECTIVE FUNCTION VALUE WITHOUT CONSTANT:   -10771.8583419220
 OBJECTIVE FUNCTION VALUE WITH CONSTANT:      -7096.10420910333
 REPORTED OBJECTIVE FUNCTION DOES NOT CONTAIN CONSTANT

 TOTAL EFFECTIVE ETAS (NIND*NETA):                          1600


 #TERE:
 Elapsed estimation  time in seconds:    71.85
 Elapsed covariance  time in seconds:     0.06

 ********************                          ITERATIVE TWO STAGE (NO PRIOR)                        ********************
 #OBJT:**************                        FINAL VALUE OF OBJECTIVE FUNCTION                       ********************
 #OBJV:********************************************        -10771.858       *********************************************

 ********************                          ITERATIVE TWO STAGE (NO PRIOR)                        ********************
 ********************                             FINAL PARAMETER ESTIMATE                           ********************

 THETA - VECTOR OF FIXED EFFECTS PARAMETERS   *********
         TH 1      TH 2      TH 3      TH 4      TH 5      TH 6      TH 7      TH 8      TH 9      TH10      TH11
         3.30E+00  3.26E+00 -6.11E-01 -2.08E-01  7.29E-01  1.14E+00  3.37E-01  1.92E-01  6.92E-01  2.30E+00  1.00E-01

 OMEGA - COV MATRIX FOR RANDOM EFFECTS - ETAS  ********
         ETA1      ETA2      ETA3      ETA4
 ETA1
+        1.02E-02
 ETA2
+        1.53E-04  7.90E-03
 ETA3
+        1.18E-03 -3.76E-04  9.87E-03
 ETA4
+       -6.46E-04  4.42E-04  1.95E-03  9.66E-03

 SIGMA - COV MATRIX FOR RANDOM EFFECTS - EPSILONS  ****
         EPS1
 EPS1
+        1.00E+00

 OMEGA - CORR MATRIX FOR RANDOM EFFECTS - ETAS  *******
         ETA1      ETA2      ETA3      ETA4
 ETA1
+        1.01E-01
 ETA2
+        1.70E-02  8.89E-02
 ETA3
+        1.17E-01 -4.26E-02  9.93E-02
 ETA4
+       -6.50E-02  5.06E-02  2.00E-01  9.83E-02

 SIGMA - CORR MATRIX FOR RANDOM EFFECTS - EPSILONS  ***
         EPS1
 EPS1
+        1.00E+00

 ********************                          ITERATIVE TWO STAGE (NO PRIOR)                        ********************
 ********************                          STANDARD ERROR OF ESTIMATE (S)                        ********************

 THETA - VECTOR OF FIXED EFFECTS PARAMETERS   *********
         TH 1      TH 2      TH 3      TH 4      TH 5      TH 6      TH 7      TH 8      TH 9      TH10      TH11
         3.79E-02  2.88E-02  1.11E-02  8.40E-03  4.82E-02  4.09E-02  1.34E-02  1.18E-02  1.05E-02  8.92E-03  2.99E-03

 OMEGA - COV MATRIX FOR RANDOM EFFECTS - ETAS  ********
         ETA1      ETA2      ETA3      ETA4
 ETA1
+        1.00E-03
 ETA2
+        8.63E-04  1.49E-03
 ETA3
+        1.29E-03  1.43E-03  2.82E-03
 ETA4
+        1.12E-03  1.15E-03  1.98E-03  2.00E-03

 SIGMA - COV MATRIX FOR RANDOM EFFECTS - EPSILONS  ****
         EPS1
 EPS1
+        0.00E+00

 OMEGA - CORR MATRIX FOR RANDOM EFFECTS - ETAS  *******
         ETA1      ETA2      ETA3      ETA4
 ETA1
+        4.96E-03
 ETA2
+        9.50E-02  8.40E-03
 ETA3
+        1.21E-01  1.66E-01  1.42E-02
 ETA4
+        1.16E-01  1.28E-01  1.65E-01  1.02E-02

 SIGMA - CORR MATRIX FOR RANDOM EFFECTS - EPSILONS  ***
         EPS1
 EPS1
+       .........
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 #TBLN:      2
 #METH: Importance Sampling (No Prior)
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
 #TERM:
 OPTIMIZATION WAS COMPLETED

 ETABAR IS THE ARITHMETIC MEAN OF THE ETA-ESTIMATES,
 AND THE P-VALUE IS GIVEN FOR THE NULL HYPOTHESIS THAT THE TRUE MEAN IS 0.

 ETABAR:        -1.0080E-04 -1.0444E-04  5.7553E-05 -1.0926E-04
 SE:             4.7111E-03  2.9636E-03  2.8819E-03  3.6677E-03
 N:                     400         400         400         400

 P VAL.:         9.8293E-01  9.7189E-01  9.8407E-01  9.7623E-01

 ETASHRINKSD(%)  7.0460E+00  3.3603E+01  4.1539E+01  2.5292E+01
 ETASHRINKVR(%)  1.3596E+01  5.5914E+01  6.5824E+01  4.4187E+01
 EBVSHRINKSD(%)  7.0461E+00  3.3662E+01  4.1563E+01  2.5161E+01
 EBVSHRINKVR(%)  1.3596E+01  5.5992E+01  6.5851E+01  4.3991E+01
 RELATIVEINF(%)  7.7386E+01  4.1222E+01  2.7184E+01  4.1002E+01
 EPSSHRINKSD(%)  2.6320E+01
 EPSSHRINKVR(%)  4.5713E+01


 TOTAL DATA POINTS NORMALLY DISTRIBUTED (N):         2000
 N*LOG(2PI) CONSTANT TO OBJECTIVE FUNCTION:    3675.75413281869
 OBJECTIVE FUNCTION VALUE WITHOUT CONSTANT:   -10779.7875948519
 OBJECTIVE FUNCTION VALUE WITH CONSTANT:      -7104.03346203324
 REPORTED OBJECTIVE FUNCTION DOES NOT CONTAIN CONSTANT

 TOTAL EFFECTIVE ETAS (NIND*NETA):                          1600


 #TERE:
 Elapsed estimation  time in seconds:   169.07
 Elapsed covariance  time in seconds:    17.32

 ********************                          IMPORTANCE SAMPLING (NO PRIOR)                        ********************
 #OBJT:**************                        FINAL VALUE OF OBJECTIVE FUNCTION                       ********************
 #OBJV:********************************************        -10779.788       *********************************************

 ********************                          IMPORTANCE SAMPLING (NO PRIOR)                        ********************
 ********************                             FINAL PARAMETER ESTIMATE                           ********************

 THETA - VECTOR OF FIXED EFFECTS PARAMETERS   *********
         TH 1      TH 2      TH 3      TH 4      TH 5      TH 6      TH 7      TH 8      TH 9      TH10      TH11
         3.30E+00  3.25E+00 -6.12E-01 -2.08E-01  7.32E-01  1.14E+00  3.36E-01  1.92E-01  6.90E-01  2.30E+00  1.00E-01

 OMEGA - COV MATRIX FOR RANDOM EFFECTS - ETAS  ********
         ETA1      ETA2      ETA3      ETA4
 ETA1
+        1.03E-02
 ETA2
+        1.73E-04  7.97E-03
 ETA3
+        1.19E-03 -1.99E-04  9.72E-03
 ETA4
+       -6.57E-04  4.91E-04  1.80E-03  9.64E-03

 SIGMA - COV MATRIX FOR RANDOM EFFECTS - EPSILONS  ****
         EPS1
 EPS1
+        1.00E+00

 OMEGA - CORR MATRIX FOR RANDOM EFFECTS - ETAS  *******
         ETA1      ETA2      ETA3      ETA4
 ETA1
+        1.01E-01
 ETA2
+        1.91E-02  8.93E-02
 ETA3
+        1.19E-01 -2.26E-02  9.86E-02
 ETA4
+       -6.60E-02  5.60E-02  1.86E-01  9.82E-02

 SIGMA - CORR MATRIX FOR RANDOM EFFECTS - EPSILONS  ***
         EPS1
 EPS1
+        1.00E+00

 ********************                          IMPORTANCE SAMPLING (NO PRIOR)                        ********************
 ********************                          STANDARD ERROR OF ESTIMATE (R)                        ********************

 THETA - VECTOR OF FIXED EFFECTS PARAMETERS   *********
         TH 1      TH 2      TH 3      TH 4      TH 5      TH 6      TH 7      TH 8      TH 9      TH10      TH11
         3.27E-02  2.88E-02  9.53E-03  8.35E-03  3.94E-02  3.64E-02  1.14E-02  1.05E-02  1.05E-02  8.61E-03  2.80E-03

 OMEGA - COV MATRIX FOR RANDOM EFFECTS - ETAS  ********
         ETA1      ETA2      ETA3      ETA4
 ETA1
+        9.71E-04
 ETA2
+        8.28E-04  1.35E-03
 ETA3
+        1.31E-03  1.40E-03  3.32E-03
 ETA4
+        1.02E-03  1.08E-03  2.29E-03  1.96E-03

 SIGMA - COV MATRIX FOR RANDOM EFFECTS - EPSILONS  ****
         EPS1
 EPS1
+        0.00E+00

 OMEGA - CORR MATRIX FOR RANDOM EFFECTS - ETAS  *******
         ETA1      ETA2      ETA3      ETA4
 ETA1
+        4.79E-03
 ETA2
+        9.07E-02  7.58E-03
 ETA3
+        1.19E-01  1.61E-01  1.68E-02
 ETA4
+        1.06E-01  1.21E-01  1.94E-01  9.99E-03

 SIGMA - CORR MATRIX FOR RANDOM EFFECTS - EPSILONS  ***
         EPS1
 EPS1
+       .........
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 #TBLN:      3
 #METH: Stochastic Approximation Expectation-Maximization (No Prior)
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 Elapsed burn-in time in seconds:    40.93
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
 #TERM:
 STOCHASTIC PORTION WAS COMPLETED
 REDUCED STOCHASTIC PORTION WAS COMPLETED

 ETABAR IS THE ARITHMETIC MEAN OF THE ETA-ESTIMATES,
 AND THE P-VALUE IS GIVEN FOR THE NULL HYPOTHESIS THAT THE TRUE MEAN IS 0.

 ETABAR:        -2.5492E-07  4.8496E-07 -2.4302E-08  1.8552E-08
 SE:             4.6648E-03  2.9151E-03  2.3811E-03  3.3863E-03
 N:                     400         400         400         400

 P VAL.:         9.9996E-01  9.9987E-01  9.9999E-01  1.0000E+00

 ETASHRINKSD(%)  5.9345E+00  3.2675E+01  3.1139E+01  1.6682E+01
 ETASHRINKVR(%)  1.1517E+01  5.4674E+01  5.2581E+01  3.0581E+01
 EBVSHRINKSD(%)  5.9342E+00  3.2677E+01  3.1139E+01  1.6681E+01
 EBVSHRINKVR(%)  1.1516E+01  5.4676E+01  5.2581E+01  3.0579E+01
 RELATIVEINF(%)  5.7597E+01  3.0657E+01  8.8855E+00  1.5624E+01
 EPSSHRINKSD(%)  2.4296E+01
 EPSSHRINKVR(%)  4.2690E+01


 TOTAL DATA POINTS NORMALLY DISTRIBUTED (N):         2000
 N*LOG(2PI) CONSTANT TO OBJECTIVE FUNCTION:    3675.75413281869
 OBJECTIVE FUNCTION VALUE WITHOUT CONSTANT:   -20168.6981763053
 OBJECTIVE FUNCTION VALUE WITH CONSTANT:      -16492.9440434866
 REPORTED OBJECTIVE FUNCTION DOES NOT CONTAIN CONSTANT

 TOTAL EFFECTIVE ETAS (NIND*NETA):                          1600
 NIND*NETA*LOG(2PI) CONSTANT TO OBJECTIVE FUNCTION:    2940.60330625495
 OBJECTIVE FUNCTION VALUE WITHOUT CONSTANT:   -20168.6981763053
 OBJECTIVE FUNCTION VALUE WITH CONSTANT:      -17228.0948700503
 REPORTED OBJECTIVE FUNCTION DOES NOT CONTAIN CONSTANT


 #TERE:
 Elapsed estimation  time in seconds:   755.93
 Elapsed covariance  time in seconds:     0.04

 ********************           STOCHASTIC APPROXIMATION EXPECTATION-MAXIMIZATION (NO PRIOR)         ********************
 #OBJT:**************                        FINAL VALUE OF LIKELIHOOD FUNCTION                      ********************
 #OBJV:********************************************        -20168.698       *********************************************

 ********************           STOCHASTIC APPROXIMATION EXPECTATION-MAXIMIZATION (NO PRIOR)         ********************
 ********************                             FINAL PARAMETER ESTIMATE                           ********************

 THETA - VECTOR OF FIXED EFFECTS PARAMETERS   *********
         TH 1      TH 2      TH 3      TH 4      TH 5      TH 6      TH 7      TH 8      TH 9      TH10      TH11
         3.30E+00  3.25E+00 -6.12E-01 -2.08E-01  7.33E-01  1.13E+00  3.35E-01  1.93E-01  6.90E-01  2.30E+00  1.03E-01

 OMEGA - COV MATRIX FOR RANDOM EFFECTS - ETAS  ********
         ETA1      ETA2      ETA3      ETA4
 ETA1
+        9.84E-03
 ETA2
+       -2.12E-04  7.50E-03
 ETA3
+       -2.17E-04 -1.88E-03  4.78E-03
 ETA4
+       -1.72E-03 -5.53E-04 -2.10E-03  6.61E-03

 SIGMA - COV MATRIX FOR RANDOM EFFECTS - EPSILONS  ****
         EPS1
 EPS1
+        1.00E+00

 OMEGA - CORR MATRIX FOR RANDOM EFFECTS - ETAS  *******
         ETA1      ETA2      ETA3      ETA4
 ETA1
+        9.92E-02
 ETA2
+       -2.47E-02  8.66E-02
 ETA3
+       -3.16E-02 -3.14E-01  6.92E-02
 ETA4
+       -2.13E-01 -7.85E-02 -3.74E-01  8.13E-02

 SIGMA - CORR MATRIX FOR RANDOM EFFECTS - EPSILONS  ***
         EPS1
 EPS1
+        1.00E+00

 ********************           STOCHASTIC APPROXIMATION EXPECTATION-MAXIMIZATION (NO PRIOR)         ********************
 ********************                          STANDARD ERROR OF ESTIMATE (S)                        ********************

 THETA - VECTOR OF FIXED EFFECTS PARAMETERS   *********
         TH 1      TH 2      TH 3      TH 4      TH 5      TH 6      TH 7      TH 8      TH 9      TH10      TH11
         3.79E-02  2.89E-02  1.10E-02  8.45E-03  4.75E-02  4.22E-02  1.32E-02  1.22E-02  9.61E-03  8.34E-03  3.17E-03

 OMEGA - COV MATRIX FOR RANDOM EFFECTS - ETAS  ********
         ETA1      ETA2      ETA3      ETA4
 ETA1
+        9.70E-04
 ETA2
+        8.17E-04  1.43E-03
 ETA3
+        1.16E-03  1.26E-03  2.44E-03
 ETA4
+        9.95E-04  9.93E-04  1.66E-03  1.71E-03

 SIGMA - COV MATRIX FOR RANDOM EFFECTS - EPSILONS  ****
         EPS1
 EPS1
+        0.00E+00

 OMEGA - CORR MATRIX FOR RANDOM EFFECTS - ETAS  *******
         ETA1      ETA2      ETA3      ETA4
 ETA1
+        4.89E-03
 ETA2
+        9.63E-02  8.28E-03
 ETA3
+        1.72E-01  2.54E-01  1.77E-02
 ETA4
+        1.39E-01  1.46E-01  4.08E-01  1.05E-02

 SIGMA - CORR MATRIX FOR RANDOM EFFECTS - EPSILONS  ***
         EPS1
 EPS1
+       .........
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 #TBLN:      4
 #METH: Objective Function Evaluation by Importance Sampling (No Prior)
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
 #TERM:
 EXPECTATION ONLY PROCESS WAS NOT COMPLETED

 ETABAR IS THE ARITHMETIC MEAN OF THE ETA-ESTIMATES,
 AND THE P-VALUE IS GIVEN FOR THE NULL HYPOTHESIS THAT THE TRUE MEAN IS 0.

 ETABAR:        -4.8174E-05 -9.0748E-05 -2.0569E-05 -1.3944E-04
 SE:             4.6673E-03  2.9105E-03  2.3759E-03  3.3903E-03
 N:                     400         400         400         400

 P VAL.:         9.9176E-01  9.7513E-01  9.9309E-01  9.6719E-01

 ETASHRINKSD(%)  5.8847E+00  3.2782E+01  3.1290E+01  1.6585E+01
 ETASHRINKVR(%)  1.1423E+01  5.4818E+01  5.2789E+01  3.0420E+01
 EBVSHRINKSD(%)  5.9340E+00  3.2723E+01  3.1242E+01  1.6740E+01
 EBVSHRINKVR(%)  1.1516E+01  5.4738E+01  5.2723E+01  3.0677E+01
 RELATIVEINF(%)  5.5677E+01  2.9626E+01  8.1456E+00  1.4411E+01
 EPSSHRINKSD(%)  2.4301E+01
 EPSSHRINKVR(%)  4.2697E+01


 TOTAL DATA POINTS NORMALLY DISTRIBUTED (N):         2000
 N*LOG(2PI) CONSTANT TO OBJECTIVE FUNCTION:    3675.75413281869
 OBJECTIVE FUNCTION VALUE WITHOUT CONSTANT:   -10779.0711658918
 OBJECTIVE FUNCTION VALUE WITH CONSTANT:      -7103.31703307310
 REPORTED OBJECTIVE FUNCTION DOES NOT CONTAIN CONSTANT

 TOTAL EFFECTIVE ETAS (NIND*NETA):                          1600


 #TERE:
 Elapsed estimation  time in seconds:    83.11
 Elapsed covariance  time in seconds:   160.93

 ********************         OBJECTIVE FUNCTION EVALUATION BY IMPORTANCE SAMPLING (NO PRIOR)        ********************
 #OBJT:**************                        FINAL VALUE OF OBJECTIVE FUNCTION                       ********************
 #OBJV:********************************************        -10779.071       *********************************************

 ********************         OBJECTIVE FUNCTION EVALUATION BY IMPORTANCE SAMPLING (NO PRIOR)        ********************
 ********************                             FINAL PARAMETER ESTIMATE                           ********************

 THETA - VECTOR OF FIXED EFFECTS PARAMETERS   *********
         TH 1      TH 2      TH 3      TH 4      TH 5      TH 6      TH 7      TH 8      TH 9      TH10      TH11
         3.30E+00  3.25E+00 -6.12E-01 -2.08E-01  7.33E-01  1.13E+00  3.35E-01  1.93E-01  6.90E-01  2.30E+00  1.03E-01

 OMEGA - COV MATRIX FOR RANDOM EFFECTS - ETAS  ********
         ETA1      ETA2      ETA3      ETA4
 ETA1
+        9.84E-03
 ETA2
+       -2.12E-04  7.50E-03
 ETA3
+       -2.17E-04 -1.88E-03  4.78E-03
 ETA4
+       -1.72E-03 -5.53E-04 -2.10E-03  6.61E-03

 SIGMA - COV MATRIX FOR RANDOM EFFECTS - EPSILONS  ****
         EPS1
 EPS1
+        1.00E+00

 OMEGA - CORR MATRIX FOR RANDOM EFFECTS - ETAS  *******
         ETA1      ETA2      ETA3      ETA4
 ETA1
+        9.92E-02
 ETA2
+       -2.47E-02  8.66E-02
 ETA3
+       -3.16E-02 -3.14E-01  6.92E-02
 ETA4
+       -2.13E-01 -7.85E-02 -3.74E-01  8.13E-02

 SIGMA - CORR MATRIX FOR RANDOM EFFECTS - EPSILONS  ***
         EPS1
 EPS1
+        1.00E+00

 ********************         OBJECTIVE FUNCTION EVALUATION BY IMPORTANCE SAMPLING (NO PRIOR)        ********************
 ********************                          STANDARD ERROR OF ESTIMATE (R)                        ********************

 THETA - VECTOR OF FIXED EFFECTS PARAMETERS   *********
         TH 1      TH 2      TH 3      TH 4      TH 5      TH 6      TH 7      TH 8      TH 9      TH10      TH11
         3.26E-02  2.87E-02  9.51E-03  8.32E-03  3.91E-02  3.60E-02  1.13E-02  1.04E-02  1.04E-02  8.48E-03  3.02E-03

 OMEGA - COV MATRIX FOR RANDOM EFFECTS - ETAS  ********
         ETA1      ETA2      ETA3      ETA4
 ETA1
+        9.25E-04
 ETA2
+        8.03E-04  1.32E-03
 ETA3
+        1.17E-03  1.41E-03  2.91E-03
 ETA4
+        9.03E-04  1.01E-03  2.03E-03  1.72E-03

 SIGMA - COV MATRIX FOR RANDOM EFFECTS - EPSILONS  ****
         EPS1
 EPS1
+        0.00E+00

 OMEGA - CORR MATRIX FOR RANDOM EFFECTS - ETAS  *******
         ETA1      ETA2      ETA3      ETA4
 ETA1
+        4.66E-03
 ETA2
+        9.45E-02  7.64E-03
 ETA3
+        1.76E-01  2.95E-01  2.10E-02
 ETA4
+        1.28E-01  1.49E-01  5.01E-01  1.06E-02

 SIGMA - CORR MATRIX FOR RANDOM EFFECTS - EPSILONS  ***
         EPS1
 EPS1
+       .........
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 #TBLN:      5
 #METH: MCMC Bayesian Analysis
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 Elapsed burn-in time in seconds:   144.31
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
 #TERM:
 BURN-IN WAS COMPLETED
 STATISTICAL PORTION WAS COMPLETED

 ETABAR IS THE ARITHMETIC MEAN OF THE ETA-ESTIMATES,
 AND THE P-VALUE IS GIVEN FOR THE NULL HYPOTHESIS THAT THE TRUE MEAN IS 0.

 ETABAR:        -1.7155E-04 -1.0375E-04 -3.3309E-05  1.2790E-04
 SE:             4.6716E-03  2.8571E-03  2.5378E-03  3.4906E-03
 N:                     400         400         400         400

 P VAL.:         9.7071E-01  9.7103E-01  9.8953E-01  9.7077E-01

 ETASHRINKSD(%)  7.3048E+00  3.4646E+01  4.1584E+01  2.3660E+01
 ETASHRINKVR(%)  1.4076E+01  5.7288E+01  6.5876E+01  4.1722E+01
 EBVSHRINKSD(%)  6.7569E+00  3.4657E+01  4.1421E+01  2.3212E+01
 EBVSHRINKVR(%)  1.3057E+01  5.7302E+01  6.5685E+01  4.1036E+01
 RELATIVEINF(%)  7.0422E+01  3.7128E+01  1.7707E+01  2.8690E+01
 EPSSHRINKSD(%)  2.5554E+01
 EPSSHRINKVR(%)  4.4578E+01


 TOTAL DATA POINTS NORMALLY DISTRIBUTED (N):         2000
 N*LOG(2PI) CONSTANT TO OBJECTIVE FUNCTION:    3675.75413281869
 OBJECTIVE FUNCTION VALUE WITHOUT CONSTANT:   -19293.0280437230
 OBJECTIVE FUNCTION VALUE WITH CONSTANT:      -15617.2739109044
 REPORTED OBJECTIVE FUNCTION DOES NOT CONTAIN CONSTANT

 TOTAL EFFECTIVE ETAS (NIND*NETA):                          1600
 NIND*NETA*LOG(2PI) CONSTANT TO OBJECTIVE FUNCTION:    2940.60330625495
 OBJECTIVE FUNCTION VALUE WITHOUT CONSTANT:   -19293.0280437230
 OBJECTIVE FUNCTION VALUE WITH CONSTANT:      -16352.4247374681
 REPORTED OBJECTIVE FUNCTION DOES NOT CONTAIN CONSTANT

 PRIOR CONSTANT TO OBJECTIVE FUNCTION:    70.3639128125257
 OBJECTIVE FUNCTION VALUE WITHOUT CONSTANT:   -19293.0280437230
 OBJECTIVE FUNCTION VALUE WITH CONSTANT:      -19222.6641309105
 REPORTED OBJECTIVE FUNCTION DOES NOT CONTAIN CONSTANT


 #TERE:
 Elapsed estimation  time in seconds:   572.17
 Elapsed covariance  time in seconds:     0.00

 ********************                              MCMC BAYESIAN ANALYSIS                            ********************
 #OBJT:**************                       AVERAGE VALUE OF LIKELIHOOD FUNCTION                     ********************
 #OBJV:********************************************        -19293.028       *********************************************
 #OBJS:********************************************           137.498 (STD) *********************************************

 ********************                              MCMC BAYESIAN ANALYSIS                            ********************
 ********************                             FINAL PARAMETER ESTIMATE                           ********************

 THETA - VECTOR OF FIXED EFFECTS PARAMETERS   *********
         TH 1      TH 2      TH 3      TH 4      TH 5      TH 6      TH 7      TH 8      TH 9      TH10      TH11
         3.30E+00  3.25E+00 -6.12E-01 -2.08E-01  7.35E-01  1.14E+00  3.35E-01  1.92E-01  6.91E-01  2.30E+00  1.02E-01

 OMEGA - COV MATRIX FOR RANDOM EFFECTS - ETAS  ********
         ETA1      ETA2      ETA3      ETA4
 ETA1
+        1.02E-02
 ETA2
+       -3.02E-05  7.64E-03
 ETA3
+        5.79E-04 -6.86E-04  7.55E-03
 ETA4
+       -1.16E-03  1.84E-04  4.56E-05  8.36E-03

 SIGMA - COV MATRIX FOR RANDOM EFFECTS - EPSILONS  ****
         EPS1
 EPS1
+        1.00E+00

 OMEGA - CORR MATRIX FOR RANDOM EFFECTS - ETAS  *******
         ETA1      ETA2      ETA3      ETA4
 ETA1
+        1.01E-01
 ETA2
+       -7.09E-03  8.71E-02
 ETA3
+        6.02E-02 -9.88E-02  8.62E-02
 ETA4
+       -1.30E-01  2.02E-02 -1.68E-02  9.11E-02

 SIGMA - CORR MATRIX FOR RANDOM EFFECTS - EPSILONS  ***
         EPS1
 EPS1
+        1.00E+00

 ********************                              MCMC BAYESIAN ANALYSIS                            ********************
 ********************                STANDARD ERROR OF ESTIMATE (From Sample Variance)               ********************

 THETA - VECTOR OF FIXED EFFECTS PARAMETERS   *********
         TH 1      TH 2      TH 3      TH 4      TH 5      TH 6      TH 7      TH 8      TH 9      TH10      TH11
         3.31E-02  2.91E-02  9.65E-03  8.41E-03  3.78E-02  3.55E-02  1.11E-02  1.03E-02  1.07E-02  9.00E-03  2.66E-03

 OMEGA - COV MATRIX FOR RANDOM EFFECTS - ETAS  ********
         ETA1      ETA2      ETA3      ETA4
 ETA1
+        9.74E-04
 ETA2
+        8.03E-04  1.26E-03
 ETA3
+        1.07E-03  1.19E-03  1.96E-03
 ETA4
+        8.73E-04  9.50E-04  1.29E-03  1.42E-03

 SIGMA - COV MATRIX FOR RANDOM EFFECTS - EPSILONS  ****
         EPS1
 EPS1
+        0.00E+00

 OMEGA - CORR MATRIX FOR RANDOM EFFECTS - ETAS  *******
         ETA1      ETA2      ETA3      ETA4
 ETA1
+        4.82E-03
 ETA2
+        9.20E-02  7.24E-03
 ETA3
+        1.20E-01  1.59E-01  1.12E-02
 ETA4
+        9.85E-02  1.17E-01  1.61E-01  7.70E-03

 SIGMA - CORR MATRIX FOR RANDOM EFFECTS - EPSILONS  ***
         EPS1
 EPS1
+        0.00E+00
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 #TBLN:      6
 #METH: First Order Conditional Estimation with Interaction (No Prior)
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
 #TERM:
0MINIMIZATION SUCCESSFUL
 NO. OF FUNCTION EVALUATIONS USED:      621
 NO. OF SIG. DIGITS IN FINAL EST.:  2.8

 ETABAR IS THE ARITHMETIC MEAN OF THE ETA-ESTIMATES,
 AND THE P-VALUE IS GIVEN FOR THE NULL HYPOTHESIS THAT THE TRUE MEAN IS 0.

 ETABAR:         5.5379E-05 -1.0209E-03 -3.7853E-05 -9.6794E-04
 SE:             4.7163E-03  2.9851E-03  2.9488E-03  3.6732E-03
 N:                     400         400         400         400

 P VAL.:         9.9063E-01  7.3235E-01  9.8976E-01  7.9215E-01

 ETASHRINKSD(%)  6.9790E+00  3.3037E+01  4.1056E+01  2.5307E+01
 ETASHRINKVR(%)  1.3471E+01  5.5159E+01  6.5256E+01  4.4209E+01
 EBVSHRINKSD(%)  6.9643E+00  3.3076E+01  4.1035E+01  2.5321E+01
 EBVSHRINKVR(%)  1.3444E+01  5.5211E+01  6.5231E+01  4.4231E+01
 RELATIVEINF(%)  7.8113E+01  4.2166E+01  2.8300E+01  4.1876E+01
 EPSSHRINKSD(%)  2.6155E+01
 EPSSHRINKVR(%)  4.5470E+01


 TOTAL DATA POINTS NORMALLY DISTRIBUTED (N):         2000
 N*LOG(2PI) CONSTANT TO OBJECTIVE FUNCTION:    3675.75413281869
 OBJECTIVE FUNCTION VALUE WITHOUT CONSTANT:   -10772.1430246384
 OBJECTIVE FUNCTION VALUE WITH CONSTANT:      -7096.38889181968
 REPORTED OBJECTIVE FUNCTION DOES NOT CONTAIN CONSTANT

 TOTAL EFFECTIVE ETAS (NIND*NETA):                          1600


 #TERE:
 Elapsed estimation  time in seconds:    84.32
 Elapsed covariance  time in seconds:    80.12
 Elapsed postprocess time in seconds:     0.00

 ********************          FIRST ORDER CONDITIONAL ESTIMATION WITH INTERACTION (NO PRIOR)        ********************
 #OBJT:**************                       MINIMUM VALUE OF OBJECTIVE FUNCTION                      ********************
 #OBJV:********************************************        -10772.143       *********************************************

 ********************          FIRST ORDER CONDITIONAL ESTIMATION WITH INTERACTION (NO PRIOR)        ********************
 ********************                             FINAL PARAMETER ESTIMATE                           ********************

 THETA - VECTOR OF FIXED EFFECTS PARAMETERS   *********
         TH 1      TH 2      TH 3      TH 4      TH 5      TH 6      TH 7      TH 8      TH 9      TH10      TH11
         3.31E+00  3.26E+00 -6.12E-01 -2.08E-01  7.35E-01  1.14E+00  3.36E-01  1.92E-01  6.95E-01  2.30E+00  1.00E-01

 OMEGA - COV MATRIX FOR RANDOM EFFECTS - ETAS  ********
         ETA1      ETA2      ETA3      ETA4
 ETA1
+        1.03E-02
 ETA2
+        1.92E-04  7.95E-03
 ETA3
+        1.28E-03 -1.70E-04  1.00E-02
 ETA4
+       -5.94E-04  5.43E-04  2.01E-03  9.68E-03

 SIGMA - COV MATRIX FOR RANDOM EFFECTS - EPSILONS  ****
         EPS1
 EPS1
+        1.00E+00

 OMEGA - CORR MATRIX FOR RANDOM EFFECTS - ETAS  *******
         ETA1      ETA2      ETA3      ETA4
 ETA1
+        1.01E-01
 ETA2
+        2.12E-02  8.92E-02
 ETA3
+        1.26E-01 -1.91E-02  1.00E-01
 ETA4
+       -5.96E-02  6.19E-02  2.04E-01  9.84E-02

 SIGMA - CORR MATRIX FOR RANDOM EFFECTS - EPSILONS  ***
         EPS1
 EPS1
+        1.00E+00

 ********************          FIRST ORDER CONDITIONAL ESTIMATION WITH INTERACTION (NO PRIOR)        ********************
 ********************                            STANDARD ERROR OF ESTIMATE                          ********************

 THETA - VECTOR OF FIXED EFFECTS PARAMETERS   *********
         TH 1      TH 2      TH 3      TH 4      TH 5      TH 6      TH 7      TH 8      TH 9      TH10      TH11
         3.27E-02  2.86E-02  9.52E-03  8.31E-03  3.91E-02  3.58E-02  1.13E-02  1.04E-02  1.05E-02  8.57E-03  2.78E-03

 OMEGA - COV MATRIX FOR RANDOM EFFECTS - ETAS  ********
         ETA1      ETA2      ETA3      ETA4
 ETA1
+        9.68E-04
 ETA2
+        8.28E-04  1.37E-03
 ETA3
+        1.28E-03  1.43E-03  3.04E-03
 ETA4
+        1.00E-03  1.10E-03  2.14E-03  1.92E-03

 SIGMA - COV MATRIX FOR RANDOM EFFECTS - EPSILONS  ****
         EPS1
 EPS1
+       .........

 OMEGA - CORR MATRIX FOR RANDOM EFFECTS - ETAS  *******
         ETA1      ETA2      ETA3      ETA4
 ETA1
+        4.77E-03
 ETA2
+        9.06E-02  7.70E-03
 ETA3
+        1.15E-01  1.62E-01  1.52E-02
 ETA4
+        1.04E-01  1.22E-01  1.75E-01  9.77E-03

 SIGMA - CORR MATRIX FOR RANDOM EFFECTS - EPSILONS  ***
         EPS1
 EPS1
+       .........
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 Elapsed finaloutput time in seconds:     0.02
 #CPUT: Total CPU Time in Seconds,     1992.703
