Tue 10/22/2024
01:27 PM
;Model Desc: Receptor Mediated Clearance model with Dynamic Change
;            in Receptors
;Project Name: nm7examples
;Project ID: NO PROJECT DESCRIPTION

$PROB RUN# example6 (from r2compl)
$INPUT C SET ID JID TIME DV=CONC DOSE=AMT RATE EVID MDV CMT
$DATA example6.csv IGNORE=C

; The new numerical integration solver is used, although ADVAN=9
; is also efficient for this problem.

$SUBROUTINES ADVAN13 TRANS1 TOL=4
$MODEL NCOMPARTMENTS=3

$PK
MU_1=THETA(1)
MU_2=THETA(2)
MU_3=THETA(3)
MU_4=THETA(4)
MU_5=THETA(5)
MU_6=THETA(6)
MU_7=THETA(7)
MU_8=THETA(8)
VC=EXP(MU_1+ETA(1))
K10=EXP(MU_2+ETA(2))
K12=EXP(MU_3+ETA(3))
K21=EXP(MU_4+ETA(4))
VM=EXP(MU_5+ETA(5))
KMC=EXP(MU_6+ETA(6))
K03=EXP(MU_7+ETA(7))
K30=EXP(MU_8+ETA(8))
S3=VC
S1=VC
KM=KMC*S1
F3=K03/K30

$DES
DADT(1) = -(K10+K12)*A(1) + K21*A(2) - VM*A(1)*A(3)/(A(1)+KM)
DADT(2) = K12*A(1) - K21*A(2)
DADT(3) =  -VM*A(1)*A(3)/(A(1)+KM) - K30*A(3) + K03

$ERROR
CALLFL=0
ETYPE=1
IF(CMT.NE.1) ETYPE=0
IPRED=F
Y = F + F*ETYPE*EPS(1) + F*(1.0-ETYPE)*EPS(2)

$THETA
;Initial Thetas
( 4.0 )  ;[MU_1]
( -2.1 ) ;[MU_2]
( 0.7 )  ;[MU_3]
( -0.17 );[MU_4]
( 2.2 ) ;[MU_5]
( 0.14 )  ;[MU_6]
( 3.7 )  ;[MU_7]
( -0.7) ;[MU_8]

;Initial Omegas
$OMEGA BLOCK(8)
0.2 ;[p]
-0.0043  ;[f]
0.2 ;[p]
0.0048   ;[f]
-0.0023  ;[f]
0.2 ;[p]
0.0032   ;[f]
0.0059   ;[f]
-0.0014  ;[f]
0.2 ;[p]
0.0029   ;[f]
0.0027 ;[f]
-0.00026 ;[f]
-0.0032  ;[f]
0.2 ;[p]
-0.0025  ;[f]
0.00097  ;[f]
0.0024   ;[f]
0.00197  ;[f]
-0.0080  ;[f]
0.2 ;[p]
0.0031   ;[f]
-0.00571 ;[f]
0.0030   ;[f]
-0.0074  ;[f]
0.0025   ;[f]
0.0034   ;[f]
0.2 ;[p]
0.00973  ;[f]
0.00862  ;[f]
0.0041   ;[f]
0.0046   ;[f]
0.00061  ;[f]
-0.0056  ;[f]
0.0056   ;[f]
0.2 ;[p]

$SIGMA
0.1 ;[p]
0.1 ;[p]

$PRIOR NWPRI
; Omega prior
$OMEGAP BLOCK(8)
0.2 FIX
0.0 0.2
0.0 0.0 0.2
0.0 0.0 0.0 0.2
0.0 0.0 0.0 0.0 0.2
0.0 0.0 0.0 0.0 0.0 0.2
0.0 0.0 0.0 0.0 0.0 0.0 0.2
0.0 0.0 0.0 0.0 0.0 0.0 0.0 0.2
; degrees of freedom for OMEGA prior
$OMEGAPD
(8 FIXED)           ;[dfo]

; Starting with a short iterative two stage analysis brings the
; results closer so less time needs to be spent during the
; burn-in of the BAYES analysis

$EST METHOD=ITS INTERACTION SIGL=4 NITER=15 PRINT=1
     FILE=example6.ext NOABORT NOPRIOR=1

$EST METHOD=BAYES INTERACTION NBURN=4000 SIGL=4 NITER=10000
     PRINT=10 CTYPE=3 FILE=example6.txt NOABORT NOPRIOR=0

; By default, ISAMPLE_M* are 2.  Since there are many data points
; per subject, setting these to 1 is enough, and it reduces the
; time of the analysis

     ISAMPLE_M1=1 ISAMPLE_M2=1 ISAMPLE_M3=1 IACCEPT=0.4

$COV MATRIX=R UNCONDITIONAL

NM-TRAN MESSAGES
 WARNINGS AND ERRORS (IF ANY) FOR PROBLEM    1
 (WARNING  2) NM-TRAN INFERS THAT THE DATA ARE POPULATION.
Note: Analytical 2nd Derivatives are constructed in FSUBS but are never used.
      You may insert $ABBR DERIV2=NO after the first $PROB to save FSUBS construction and compilation time

1NONLINEAR MIXED EFFECTS MODEL PROGRAM (NONMEM) VERSION 7.6.0 beta 4 (nm76b4)
 ORIGINALLY DEVELOPED BY STUART BEAL, LEWIS SHEINER, AND ALISON BOECKMANN
 CURRENT DEVELOPERS ARE ROBERT BAUER, ICON DEVELOPMENT SOLUTIONS,
 AND ALISON BOECKMANN. IMPLEMENTATION, EFFICIENCY, AND STANDARDIZATION
 PERFORMED BY NOUS INFOSYSTEMS.
 PROBLEM NO.:         1
 RUN# example6 (from r2compl)
 TOT. NO. OF OBS RECS:     1568
 TOT. NO. OF INDIVIDUALS:       50
 GENERAL NONLINEAR KINETICS MODEL WITH STIFF/NONSTIFF EQUATIONS (LSODA, ADVAN13)
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 #TBLN:      1
 #METH: Iterative Two Stage (No Prior)
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
 #TERM:
 OPTIMIZATION WAS NOT TESTED FOR CONVERGENCE

 ETABAR IS THE ARITHMETIC MEAN OF THE ETA-ESTIMATES,
 AND THE P-VALUE IS GIVEN FOR THE NULL HYPOTHESIS THAT THE TRUE MEAN IS 0.

 ETABAR:        -8.4109E-04 -2.9968E-03  2.4673E-03  1.4617E-03  1.4889E-03  2.1020E-03  5.6130E-04  1.1675E-03
 SE:             6.9294E-02  5.2546E-02  3.7560E-02  6.5052E-02  5.6737E-02  5.7053E-02  6.4169E-02  6.1367E-02
 N:                      50          50          50          50          50          50          50          50

 P VAL.:         9.9032E-01  9.5452E-01  9.4762E-01  9.8207E-01  9.7906E-01  9.7061E-01  9.9302E-01  9.8482E-01

 ETASHRINKSD(%)  6.4526E-01  4.2851E+00  8.1602E+00  1.6353E+00  1.5118E+00  5.8484E+00  3.5762E-01  1.5906E+00
 ETASHRINKVR(%)  1.2863E+00  8.3866E+00  1.5655E+01  3.2439E+00  3.0008E+00  1.1355E+01  7.1396E-01  3.1560E+00
 EBVSHRINKSD(%)  6.4061E-01  5.5298E+00  1.0005E+01  2.1309E+00  1.5846E+00  6.4035E+00  4.6109E-01  1.7930E+00
 EBVSHRINKVR(%)  1.2771E+00  1.0754E+01  1.9009E+01  4.2164E+00  3.1441E+00  1.2397E+01  9.2006E-01  3.5539E+00
 RELATIVEINF(%)  1.0000E+02  3.8254E+01  6.2214E+01  9.1079E+01  7.3138E+01  4.7695E+01  1.0000E+02  6.8700E+01
 EPSSHRINKSD(%)  1.5654E+01  7.2063E+00
 EPSSHRINKVR(%)  2.8858E+01  1.3893E+01


 TOTAL DATA POINTS NORMALLY DISTRIBUTED (N):         1568
 N*LOG(2PI) CONSTANT TO OBJECTIVE FUNCTION:    2881.79124012985
 OBJECTIVE FUNCTION VALUE WITHOUT CONSTANT:   -4709.72446726038
 OBJECTIVE FUNCTION VALUE WITH CONSTANT:      -1827.93322713053
 REPORTED OBJECTIVE FUNCTION DOES NOT CONTAIN CONSTANT

 TOTAL EFFECTIVE ETAS (NIND*NETA):                           400


 #TERE:
 Elapsed estimation  time in seconds:   210.19
 Elapsed covariance  time in seconds:     0.04

 ********************                          ITERATIVE TWO STAGE (NO PRIOR)                        ********************
 #OBJT:**************                        FINAL VALUE OF OBJECTIVE FUNCTION                       ********************
 #OBJV:********************************************         -4709.724       *********************************************

 ********************                          ITERATIVE TWO STAGE (NO PRIOR)                        ********************
 ********************                             FINAL PARAMETER ESTIMATE                           ********************

 THETA - VECTOR OF FIXED EFFECTS PARAMETERS   *********
         TH 1      TH 2      TH 3      TH 4      TH 5      TH 6      TH 7      TH 8
         3.91E+00 -2.19E+00  5.58E-01 -1.87E-01  2.26E+00  2.10E-01  3.71E+00 -7.09E-01

 OMEGA - COV MATRIX FOR RANDOM EFFECTS - ETAS  ********
         ETA1      ETA2      ETA3      ETA4      ETA5      ETA6      ETA7      ETA8
 ETA1
+        2.43E-01
 ETA2
+       -3.36E-02  1.51E-01
 ETA3
+        4.63E-02 -1.38E-02  8.36E-02
 ETA4
+        3.12E-02  4.59E-02 -2.11E-02  2.19E-01
 ETA5
+        2.60E-02  2.68E-02 -2.79E-03 -3.26E-02  1.66E-01
 ETA6
+       -2.84E-02  1.06E-02  2.63E-02  1.85E-02 -7.91E-02  1.84E-01
 ETA7
+        2.83E-02 -3.27E-02  3.11E-02 -7.06E-02  2.32E-02  3.50E-03  2.07E-01
 ETA8
+        9.59E-02  8.01E-02  3.36E-02  4.32E-02  9.82E-04 -4.96E-02  5.40E-02  1.94E-01

 SIGMA - COV MATRIX FOR RANDOM EFFECTS - EPSILONS  ****
         EPS1      EPS2
 EPS1
+        9.29E-03
 EPS2
+        0.00E+00  2.25E-02

 OMEGA - CORR MATRIX FOR RANDOM EFFECTS - ETAS  *******
         ETA1      ETA2      ETA3      ETA4      ETA5      ETA6      ETA7      ETA8
 ETA1
+        4.93E-01
 ETA2
+       -1.76E-01  3.88E-01
 ETA3
+        3.25E-01 -1.23E-01  2.89E-01
 ETA4
+        1.35E-01  2.53E-01 -1.56E-01  4.68E-01
 ETA5
+        1.29E-01  1.69E-01 -2.37E-02 -1.71E-01  4.07E-01
 ETA6
+       -1.34E-01  6.39E-02  2.12E-01  9.23E-02 -4.53E-01  4.28E-01
 ETA7
+        1.26E-01 -1.85E-01  2.36E-01 -3.31E-01  1.25E-01  1.79E-02  4.55E-01
 ETA8
+        4.41E-01  4.68E-01  2.64E-01  2.10E-01  5.47E-03 -2.63E-01  2.69E-01  4.41E-01

 SIGMA - CORR MATRIX FOR RANDOM EFFECTS - EPSILONS  ***
         EPS1      EPS2
 EPS1
+        9.64E-02
 EPS2
+        0.00E+00  1.50E-01

 ********************                          ITERATIVE TWO STAGE (NO PRIOR)                        ********************
 ********************                          STANDARD ERROR OF ESTIMATE (S)                        ********************

 THETA - VECTOR OF FIXED EFFECTS PARAMETERS   *********
         TH 1      TH 2      TH 3      TH 4      TH 5      TH 6      TH 7      TH 8
         3.35E-01  2.21E-01  2.20E-01  3.04E-01  2.10E-01  2.57E-01  1.48E-01  3.71E-01

 OMEGA - COV MATRIX FOR RANDOM EFFECTS - ETAS  ********
         ETA1      ETA2      ETA3      ETA4      ETA5      ETA6      ETA7      ETA8
 ETA1
+        1.46E-01
 ETA2
+        2.18E-01  2.75E-01
 ETA3
+        1.03E-01  1.19E-01  1.76E-01
 ETA4
+        8.48E-02  1.26E-01  9.97E-02  1.64E-01
 ETA5
+        1.37E-01  8.87E-02  8.42E-02  1.61E-01  3.00E-01
 ETA6
+        1.10E-01  1.58E-01  1.31E-01  1.50E-01  8.02E-02  1.49E-01
 ETA7
+        1.57E-01  1.05E-01  1.13E-01  9.28E-02  9.82E-02  1.01E-01  1.41E-01
 ETA8
+        1.93E-01  1.43E-01  5.78E-02  8.96E-02  1.38E-01  1.94E-01  1.27E-01  2.53E-01

 SIGMA - COV MATRIX FOR RANDOM EFFECTS - EPSILONS  ****
         EPS1      EPS2
 EPS1
+        3.43E-03
 EPS2
+        0.00E+00  4.29E-03

 OMEGA - CORR MATRIX FOR RANDOM EFFECTS - ETAS  *******
         ETA1      ETA2      ETA3      ETA4      ETA5      ETA6      ETA7      ETA8
 ETA1
+        1.48E-01
 ETA2
+        1.03E+00  3.54E-01
 ETA3
+        7.08E-01  9.34E-01  3.04E-01
 ETA4
+        3.53E-01  6.22E-01  8.41E-01  1.75E-01
 ETA5
+        7.07E-01  5.61E-01  7.14E-01  9.33E-01  3.68E-01
 ETA6
+        5.46E-01  9.41E-01  1.03E+00  7.36E-01  8.03E-01  1.74E-01
 ETA7
+        6.81E-01  5.45E-01  9.47E-01  4.11E-01  5.92E-01  5.21E-01  1.55E-01
 ETA8
+        5.83E-01  7.49E-01  3.40E-01  3.58E-01  7.74E-01  9.10E-01  5.71E-01  2.87E-01

 SIGMA - CORR MATRIX FOR RANDOM EFFECTS - EPSILONS  ***
         EPS1      EPS2
 EPS1
+        1.78E-02
 EPS2
+       .........  1.43E-02
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 #TBLN:      2
 #METH: MCMC Bayesian Analysis
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 Elapsed burn-in time in seconds:    41.01
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
 #TERM:
 BURN-IN WAS COMPLETED
 STATISTICAL PORTION WAS COMPLETED

 ETABAR IS THE ARITHMETIC MEAN OF THE ETA-ESTIMATES,
 AND THE P-VALUE IS GIVEN FOR THE NULL HYPOTHESIS THAT THE TRUE MEAN IS 0.

 ETABAR:        -2.6313E-05  5.4299E-04  3.2774E-04 -5.5926E-05 -2.7576E-05 -6.4502E-04 -8.9926E-04  4.7099E-04
 SE:             6.9333E-02  5.3426E-02  4.0930E-02  6.5331E-02  5.7152E-02  5.7516E-02  6.4341E-02  6.1879E-02
 N:                      50          50          50          50          50          50          50          50

 P VAL.:         9.9970E-01  9.9189E-01  9.9361E-01  9.9932E-01  9.9962E-01  9.9105E-01  9.8885E-01  9.9393E-01

 ETASHRINKSD(%)  7.6588E+00  1.8290E+01  2.2789E+01  9.6878E+00  1.0978E+01  1.6093E+01  8.4692E+00  1.0132E+01
 ETASHRINKVR(%)  1.4731E+01  3.3235E+01  4.0385E+01  1.8437E+01  2.0751E+01  2.9597E+01  1.6221E+01  1.9237E+01
 EBVSHRINKSD(%)  6.5870E-01  8.8401E+00  8.3176E+00  2.1241E+00  1.8283E+00  7.4078E+00  6.2554E-01  1.7916E+00
 EBVSHRINKVR(%)  1.3131E+00  1.6899E+01  1.5943E+01  4.2032E+00  3.6232E+00  1.4267E+01  1.2472E+00  3.5511E+00
 RELATIVEINF(%)  9.7785E+01  7.1500E+01  7.9150E+01  9.3368E+01  9.1037E+01  7.6894E+01  1.0000E+02  9.1442E+01
 EPSSHRINKSD(%)  1.6873E+01  8.1582E+00
 EPSSHRINKVR(%)  3.0900E+01  1.5651E+01


 TOTAL DATA POINTS NORMALLY DISTRIBUTED (N):         1568
 N*LOG(2PI) CONSTANT TO OBJECTIVE FUNCTION:    2881.79124012985
 OBJECTIVE FUNCTION VALUE WITHOUT CONSTANT:   -6490.94969271459
 OBJECTIVE FUNCTION VALUE WITH CONSTANT:      -3609.15845258474
 REPORTED OBJECTIVE FUNCTION DOES NOT CONTAIN CONSTANT

 TOTAL EFFECTIVE ETAS (NIND*NETA):                           400
 NIND*NETA*LOG(2PI) CONSTANT TO OBJECTIVE FUNCTION:    735.150826563738
 OBJECTIVE FUNCTION VALUE WITHOUT CONSTANT:   -6490.94969271459
 OBJECTIVE FUNCTION VALUE WITH CONSTANT:      -5755.79886615085
 REPORTED OBJECTIVE FUNCTION DOES NOT CONTAIN CONSTANT

 PRIOR CONSTANT TO OBJECTIVE FUNCTION:    55.1779157436876
 OBJECTIVE FUNCTION VALUE WITHOUT CONSTANT:   -6490.94969271459
 OBJECTIVE FUNCTION VALUE WITH CONSTANT:      -6435.77177697090
 REPORTED OBJECTIVE FUNCTION DOES NOT CONTAIN CONSTANT


 #TERE:
 Elapsed estimation  time in seconds:  3097.66
 Elapsed covariance  time in seconds:     0.00

 ********************                              MCMC BAYESIAN ANALYSIS                            ********************
 #OBJT:**************                       AVERAGE VALUE OF LIKELIHOOD FUNCTION                     ********************
 #OBJV:********************************************         -6490.950       *********************************************
 #OBJS:********************************************            38.373 (STD) *********************************************

 ********************                              MCMC BAYESIAN ANALYSIS                            ********************
 ********************                             FINAL PARAMETER ESTIMATE                           ********************

 THETA - VECTOR OF FIXED EFFECTS PARAMETERS   *********
         TH 1      TH 2      TH 3      TH 4      TH 5      TH 6      TH 7      TH 8
         3.91E+00 -2.22E+00  5.53E-01 -1.83E-01  2.27E+00  2.39E-01  3.71E+00 -7.04E-01

 OMEGA - COV MATRIX FOR RANDOM EFFECTS - ETAS  ********
         ETA1      ETA2      ETA3      ETA4      ETA5      ETA6      ETA7      ETA8
 ETA1
+        2.82E-01
 ETA2
+       -3.48E-02  2.14E-01
 ETA3
+        4.52E-02 -9.80E-03  1.41E-01
 ETA4
+        3.02E-02  5.48E-02 -1.43E-02  2.62E-01
 ETA5
+        2.72E-02  1.65E-02 -7.45E-04 -3.22E-02  2.06E-01
 ETA6
+       -2.68E-02  4.75E-03  1.58E-02  1.46E-02 -7.38E-02  2.35E-01
 ETA7
+        2.97E-02 -4.76E-02  3.19E-02 -7.39E-02  2.37E-02 -3.16E-04  2.47E-01
 ETA8
+        9.58E-02  7.36E-02  4.13E-02  4.61E-02  3.99E-03 -5.14E-02  5.74E-02  2.37E-01

 SIGMA - COV MATRIX FOR RANDOM EFFECTS - EPSILONS  ****
         EPS1      EPS2
 EPS1
+        9.32E-03
 EPS2
+        0.00E+00  2.24E-02

 OMEGA - CORR MATRIX FOR RANDOM EFFECTS - ETAS  *******
         ETA1      ETA2      ETA3      ETA4      ETA5      ETA6      ETA7      ETA8
 ETA1
+        5.28E-01
 ETA2
+       -1.39E-01  4.59E-01
 ETA3
+        2.27E-01 -5.67E-02  3.72E-01
 ETA4
+        1.10E-01  2.29E-01 -7.67E-02  5.09E-01
 ETA5
+        1.12E-01  7.96E-02 -5.94E-03 -1.38E-01  4.51E-01
 ETA6
+       -1.05E-01  2.30E-02  8.93E-02  5.82E-02 -3.35E-01  4.81E-01
 ETA7
+        1.11E-01 -2.01E-01  1.70E-01 -2.88E-01  1.03E-01 -1.66E-03  4.94E-01
 ETA8
+        3.68E-01  3.27E-01  2.23E-01  1.83E-01  1.67E-02 -2.16E-01  2.35E-01  4.84E-01

 SIGMA - CORR MATRIX FOR RANDOM EFFECTS - EPSILONS  ***
         EPS1      EPS2
 EPS1
+        9.65E-02
 EPS2
+        0.00E+00  1.50E-01

 ********************                              MCMC BAYESIAN ANALYSIS                            ********************
 ********************                STANDARD ERROR OF ESTIMATE (From Sample Variance)               ********************

 THETA - VECTOR OF FIXED EFFECTS PARAMETERS   *********
         TH 1      TH 2      TH 3      TH 4      TH 5      TH 6      TH 7      TH 8
         7.63E-02  7.50E-02  5.94E-02  7.38E-02  6.57E-02  7.48E-02  7.16E-02  7.02E-02

 OMEGA - COV MATRIX FOR RANDOM EFFECTS - ETAS  ********
         ETA1      ETA2      ETA3      ETA4      ETA5      ETA6      ETA7      ETA8
 ETA1
+        5.88E-02
 ETA2
+        4.03E-02  5.63E-02
 ETA3
+        3.19E-02  2.91E-02  3.48E-02
 ETA4
+        4.06E-02  3.96E-02  3.20E-02  5.79E-02
 ETA5
+        3.56E-02  3.30E-02  2.72E-02  3.51E-02  4.43E-02
 ETA6
+        4.07E-02  3.77E-02  2.99E-02  3.99E-02  3.56E-02  5.65E-02
 ETA7
+        3.91E-02  4.06E-02  2.96E-02  3.94E-02  3.39E-02  3.75E-02  5.14E-02
 ETA8
+        4.09E-02  3.74E-02  3.01E-02  3.82E-02  3.36E-02  3.81E-02  3.69E-02  5.14E-02

 SIGMA - COV MATRIX FOR RANDOM EFFECTS - EPSILONS  ****
         EPS1      EPS2
 EPS1
+        6.44E-04
 EPS2
+        0.00E+00  1.19E-03

 OMEGA - CORR MATRIX FOR RANDOM EFFECTS - ETAS  *******
         ETA1      ETA2      ETA3      ETA4      ETA5      ETA6      ETA7      ETA8
 ETA1
+        5.42E-02
 ETA2
+        1.52E-01  5.89E-02
 ETA3
+        1.46E-01  1.60E-01  4.52E-02
 ETA4
+        1.41E-01  1.47E-01  1.60E-01  5.53E-02
 ETA5
+        1.40E-01  1.51E-01  1.54E-01  1.42E-01  4.76E-02
 ETA6
+        1.51E-01  1.62E-01  1.58E-01  1.54E-01  1.38E-01  5.70E-02
 ETA7
+        1.40E-01  1.55E-01  1.47E-01  1.31E-01  1.41E-01  1.50E-01  5.06E-02
 ETA8
+        1.25E-01  1.41E-01  1.45E-01  1.40E-01  1.46E-01  1.45E-01  1.35E-01  5.15E-02

 SIGMA - CORR MATRIX FOR RANDOM EFFECTS - EPSILONS  ***
         EPS1      EPS2
 EPS1
+        3.33E-03
 EPS2
+        0.00E+00  3.97E-03
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 Elapsed postprocess time in seconds:     0.00
 Elapsed finaloutput time in seconds:     0.00
 #CPUT: Total CPU Time in Seconds,     3293.359
