Tue 10/22/2024
05:47 PM
;Model Desc: Interoccasion Variability
;Project Name: nm7examples
;Project ID: NO PROJECT DESCRIPTION

$PROB run# example7 (from ad1tr2_occ)
$INPUT C SET ID  TIME  AMT RATE EVID MDV CMT DV
$DATA example7.csv IGNORE=C

$SUBROUTINES ADVAN1 TRANS2

$PRIOR NWPRI NTHETA=2, NETA=5, NTHP=0, NETP=5, NPEXP=1

$PK
MU_1=THETA(1)
MU_2=THETA(2)
V=DEXP(MU_1+ETA(1))
CLB=DEXP(MU_2+ETA(2))
DCL1=DEXP(ETA(3))
DCL2=DEXP(ETA(4))
DCL3=DEXP(ETA(5))
S1=V
DCL=DCL1
IF(TIME.GE.5.0) DCL=DCL2
IF(TIME.GE.10.0) DCL=DCL3
CL=CLB*DCL
VC=V

$ERROR
IPRED=F
Y = F+F*EPS(1)

;Initial Thetas
$THETA
 2.0  ;[MU_1]
 2.0  ;[MU_2]

;Initial omegas
$OMEGA BLOCK(2)
 .3 ;[p]
 -.01  ;[f]
 .3 ;[p]
$OMEGA BLOCK(1)
 .1  ;[p]
$OMEGA BLOCK(1) SAME
$OMEGA  BLOCK(1) SAME

$SIGMA
 0.1 ;[p]

; Degrees of freedom for Prior Omega blocks
$THETA (2.0 FIXED) (1.0 FIXED)
; Prior Omegas
$OMEGA BLOCK(2)
 .14 FIX
 0.0 .125
$OMEGA BLOCK(1) .0164 FIX
$OMEGA BLOCK(1) SAME
$OMEGA  BLOCK(1) SAME

$EST METHOD=ITS INTERACTION FILE=example7.ext   NITER=10000 PRINT=5 NOABORT SIGL=8 CTYPE=3 CITER=10
 NOPRIOR=1 CALPHA=0.05 NSIG=2
$EST METHOD=SAEM INTERACTION NBURN=30000 NITER=500 SIGL=8 ISAMPLE=2 PRINT=10 SEED=1556678 CTYPE=3
 CITER=10 CALPHA=0.05 NOPRIOR=1
$EST METHOD=IMP  INTERACTION EONLY=1 NITER=4 ISAMPLE=3000 PRINT=1 SIGL=10 NOPRIOR=1 MAPITER=0
$EST METHOD=BAYES INTERACTION FILE=example7.txt NBURN=10000 NITER=10000 PRINT=100 CTYPE=3 CITER=10
CALPHA=0.05 NOPRIOR=0
$EST METHOD=COND INTERACTION MAXEVAL=9999 NSIG=3 SIGL=10 PRINT=5 NOABORT NOPRIOR=1
     FILE=example7.ext
$COV MATRIX=R PRINT=E UNCONDITIONAL

NM-TRAN MESSAGES
 WARNINGS AND ERRORS (IF ANY) FOR PROBLEM    1
 (WARNING  2) NM-TRAN INFERS THAT THE DATA ARE POPULATION.
Note: Analytical 2nd Derivatives are constructed in FSUBS but are never used.
      You may insert $ABBR DERIV2=NO after the first $PROB to save FSUBS construction and compilation time

1NONLINEAR MIXED EFFECTS MODEL PROGRAM (NONMEM) VERSION 7.6.0 beta 4 (nm76b4)
 ORIGINALLY DEVELOPED BY STUART BEAL, LEWIS SHEINER, AND ALISON BOECKMANN
 CURRENT DEVELOPERS ARE ROBERT BAUER, ICON DEVELOPMENT SOLUTIONS,
 AND ALISON BOECKMANN. IMPLEMENTATION, EFFICIENCY, AND STANDARDIZATION
 PERFORMED BY NOUS INFOSYSTEMS.
 PROBLEM NO.:         1
 run# example7 (from ad1tr2_occ)
 TOT. NO. OF OBS RECS:     3750
 TOT. NO. OF INDIVIDUALS:      250
 ONE COMPARTMENT MODEL (ADVAN1)
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 #TBLN:      1
 #METH: Iterative Two Stage (No Prior)
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
 #TERM:
 OPTIMIZATION WAS COMPLETED

 ETABAR IS THE ARITHMETIC MEAN OF THE ETA-ESTIMATES,
 AND THE P-VALUE IS GIVEN FOR THE NULL HYPOTHESIS THAT THE TRUE MEAN IS 0.

 ETABAR:         6.2675E-11  1.0171E-10 -6.6930E-03  2.6067E-03  4.0863E-03
 SE:             2.3551E-02  2.1839E-02  6.6354E-03  6.6172E-03  6.8549E-03
 N:                     250         250         250         250         250

 P VAL.:         1.0000E+00  1.0000E+00  3.1313E-01  6.9364E-01  5.5110E-01

 ETASHRINKSD(%)  1.3901E-01  2.1759E+00  1.8631E+01  1.8994E+01  1.6050E+01
 ETASHRINKVR(%)  2.7783E-01  4.3045E+00  3.3791E+01  3.4380E+01  2.9524E+01
 EBVSHRINKSD(%)  1.3901E-01  2.1759E+00  1.7842E+01  1.7940E+01  1.7861E+01
 EBVSHRINKVR(%)  2.7782E-01  4.3045E+00  3.2501E+01  3.2661E+01  3.2532E+01
 RELATIVEINF(%)  9.9432E+01  1.0000E-10  1.0000E-10  1.0000E-10  1.0000E-10
 EPSSHRINKSD(%)  1.4062E+01
 EPSSHRINKVR(%)  2.6146E+01


 TOTAL DATA POINTS NORMALLY DISTRIBUTED (N):         3750
 N*LOG(2PI) CONSTANT TO OBJECTIVE FUNCTION:    6892.03899903504
 OBJECTIVE FUNCTION VALUE WITHOUT CONSTANT:   -19599.6329883718
 OBJECTIVE FUNCTION VALUE WITH CONSTANT:      -12707.5939893367
 REPORTED OBJECTIVE FUNCTION DOES NOT CONTAIN CONSTANT

 TOTAL EFFECTIVE ETAS (NIND*NETA):                          1250


 #TERE:
 Elapsed estimation  time in seconds:    29.73
 Elapsed covariance  time in seconds:     0.05

 ********************                          ITERATIVE TWO STAGE (NO PRIOR)                        ********************
 #OBJT:**************                        FINAL VALUE OF OBJECTIVE FUNCTION                       ********************
 #OBJV:********************************************        -19599.633       *********************************************

 ********************                          ITERATIVE TWO STAGE (NO PRIOR)                        ********************
 ********************                             FINAL PARAMETER ESTIMATE                           ********************

 THETA - VECTOR OF FIXED EFFECTS PARAMETERS   *********
         TH 1      TH 2
         3.89E+00  3.68E+00

 OMEGA - COV MATRIX FOR RANDOM EFFECTS - ETAS  ********
         ETA1      ETA2      ETA3      ETA4      ETA5
 ETA1
+        1.39E-01
 ETA2
+       -8.04E-02  1.25E-01
 ETA3
+        0.00E+00  0.00E+00  1.67E-02
 ETA4
+        0.00E+00  0.00E+00  0.00E+00  1.67E-02
 ETA5
+        0.00E+00  0.00E+00  0.00E+00  0.00E+00  1.67E-02

 SIGMA - COV MATRIX FOR RANDOM EFFECTS - EPSILONS  ****
         EPS1
 EPS1
+        2.50E-03

 OMEGA - CORR MATRIX FOR RANDOM EFFECTS - ETAS  *******
         ETA1      ETA2      ETA3      ETA4      ETA5
 ETA1
+        3.73E-01
 ETA2
+       -6.11E-01  3.53E-01
 ETA3
+        0.00E+00  0.00E+00  1.29E-01
 ETA4
+        0.00E+00  0.00E+00  0.00E+00  1.29E-01
 ETA5
+        0.00E+00  0.00E+00  0.00E+00  0.00E+00  1.29E-01

 SIGMA - CORR MATRIX FOR RANDOM EFFECTS - EPSILONS  ***
         EPS1
 EPS1
+        5.00E-02

 ********************                          ITERATIVE TWO STAGE (NO PRIOR)                        ********************
 ********************                          STANDARD ERROR OF ESTIMATE (S)                        ********************

 THETA - VECTOR OF FIXED EFFECTS PARAMETERS   *********
         TH 1      TH 2
         2.39E-02  2.32E-02

 OMEGA - COV MATRIX FOR RANDOM EFFECTS - ETAS  ********
         ETA1      ETA2      ETA3      ETA4      ETA5
 ETA1
+        1.26E-02
 ETA2
+        1.11E-02  1.31E-02
 ETA3
+        0.00E+00  0.00E+00  1.14E-03
 ETA4
+        0.00E+00  0.00E+00  0.00E+00  1.14E-03
 ETA5
+        0.00E+00  0.00E+00  0.00E+00  0.00E+00  1.14E-03

 SIGMA - COV MATRIX FOR RANDOM EFFECTS - EPSILONS  ****
         EPS1
 EPS1
+        6.46E-05

 OMEGA - CORR MATRIX FOR RANDOM EFFECTS - ETAS  *******
         ETA1      ETA2      ETA3      ETA4      ETA5
 ETA1
+        1.69E-02
 ETA2
+        4.73E-02  1.85E-02
 ETA3
+       ......... .........  4.41E-03
 ETA4
+       ......... ......... ......... .........
 ETA5
+       ......... ......... ......... ......... .........

 SIGMA - CORR MATRIX FOR RANDOM EFFECTS - EPSILONS  ***
         EPS1
 EPS1
+        6.46E-04
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
 ********************                          ITERATIVE TWO STAGE (NO PRIOR)                        ********************
 ********************                    EIGENVALUES OF COR MATRIX OF ESTIMATE (S)                   ********************

             1         2         3         4         5         6         7
         1.54E-01  3.84E-01  5.57E-01  9.15E-01  1.03E+00  1.65E+00  2.31E+00
 #TBLN:      2
 #METH: Stochastic Approximation Expectation-Maximization (No Prior)
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 Elapsed burn-in time in seconds:    98.59
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
 #TERM:
 STOCHASTIC PORTION WAS COMPLETED
 REDUCED STOCHASTIC PORTION WAS COMPLETED

 ETABAR IS THE ARITHMETIC MEAN OF THE ETA-ESTIMATES,
 AND THE P-VALUE IS GIVEN FOR THE NULL HYPOTHESIS THAT THE TRUE MEAN IS 0.

 ETABAR:         2.1235E-06  1.0435E-05 -7.2368E-03  2.4283E-03  3.8949E-03
 SE:             2.3563E-02  2.2005E-02  6.6552E-03  6.5911E-03  6.9264E-03
 N:                     250         250         250         250         250

 P VAL.:         9.9993E-01  9.9962E-01  2.7687E-01  7.1256E-01  5.7389E-01

 ETASHRINKSD(%)  1.3730E-01  1.8541E+00  1.6717E+01  1.7692E+01  1.3473E+01
 ETASHRINKVR(%)  2.7442E-01  3.6738E+00  3.0640E+01  3.2254E+01  2.5131E+01
 EBVSHRINKSD(%)  1.3717E-01  1.8549E+00  1.5891E+01  1.6030E+01  1.5914E+01
 EBVSHRINKVR(%)  2.7414E-01  3.6753E+00  2.9256E+01  2.9490E+01  2.9295E+01
 RELATIVEINF(%)  9.9517E+01  6.5336E+01  2.7807E+01  2.7749E+01  2.7813E+01
 EPSSHRINKSD(%)  1.4008E+01
 EPSSHRINKVR(%)  2.6053E+01


 TOTAL DATA POINTS NORMALLY DISTRIBUTED (N):         3750
 N*LOG(2PI) CONSTANT TO OBJECTIVE FUNCTION:    6892.03899903504
 OBJECTIVE FUNCTION VALUE WITHOUT CONSTANT:   -28675.0546339801
 OBJECTIVE FUNCTION VALUE WITH CONSTANT:      -21783.0156349451
 REPORTED OBJECTIVE FUNCTION DOES NOT CONTAIN CONSTANT

 TOTAL EFFECTIVE ETAS (NIND*NETA):                          1250
 NIND*NETA*LOG(2PI) CONSTANT TO OBJECTIVE FUNCTION:    2297.34633301168
 OBJECTIVE FUNCTION VALUE WITHOUT CONSTANT:   -28675.0546339801
 OBJECTIVE FUNCTION VALUE WITH CONSTANT:      -26377.7083009685
 REPORTED OBJECTIVE FUNCTION DOES NOT CONTAIN CONSTANT


 #TERE:
 Elapsed estimation  time in seconds:   265.97
 Elapsed covariance  time in seconds:     0.04

 ********************           STOCHASTIC APPROXIMATION EXPECTATION-MAXIMIZATION (NO PRIOR)         ********************
 #OBJT:**************                        FINAL VALUE OF LIKELIHOOD FUNCTION                      ********************
 #OBJV:********************************************        -28675.055       *********************************************

 ********************           STOCHASTIC APPROXIMATION EXPECTATION-MAXIMIZATION (NO PRIOR)         ********************
 ********************                             FINAL PARAMETER ESTIMATE                           ********************

 THETA - VECTOR OF FIXED EFFECTS PARAMETERS   *********
         TH 1      TH 2
         3.89E+00  3.68E+00

 OMEGA - COV MATRIX FOR RANDOM EFFECTS - ETAS  ********
         ETA1      ETA2      ETA3      ETA4      ETA5
 ETA1
+        1.39E-01
 ETA2
+       -8.13E-02  1.26E-01
 ETA3
+        0.00E+00  0.00E+00  1.60E-02
 ETA4
+        0.00E+00  0.00E+00  0.00E+00  1.60E-02
 ETA5
+        0.00E+00  0.00E+00  0.00E+00  0.00E+00  1.60E-02

 SIGMA - COV MATRIX FOR RANDOM EFFECTS - EPSILONS  ****
         EPS1
 EPS1
+        2.50E-03

 OMEGA - CORR MATRIX FOR RANDOM EFFECTS - ETAS  *******
         ETA1      ETA2      ETA3      ETA4      ETA5
 ETA1
+        3.73E-01
 ETA2
+       -6.15E-01  3.55E-01
 ETA3
+        0.00E+00  0.00E+00  1.27E-01
 ETA4
+        0.00E+00  0.00E+00  0.00E+00  1.27E-01
 ETA5
+        0.00E+00  0.00E+00  0.00E+00  0.00E+00  1.27E-01

 SIGMA - CORR MATRIX FOR RANDOM EFFECTS - EPSILONS  ***
         EPS1
 EPS1
+        5.00E-02

 ********************           STOCHASTIC APPROXIMATION EXPECTATION-MAXIMIZATION (NO PRIOR)         ********************
 ********************                          STANDARD ERROR OF ESTIMATE (S)                        ********************

 THETA - VECTOR OF FIXED EFFECTS PARAMETERS   *********
         TH 1      TH 2
         2.38E-02  2.31E-02

 OMEGA - COV MATRIX FOR RANDOM EFFECTS - ETAS  ********
         ETA1      ETA2      ETA3      ETA4      ETA5
 ETA1
+        1.26E-02
 ETA2
+        1.11E-02  1.30E-02
 ETA3
+        0.00E+00  0.00E+00  1.05E-03
 ETA4
+        0.00E+00  0.00E+00  0.00E+00  1.05E-03
 ETA5
+        0.00E+00  0.00E+00  0.00E+00  0.00E+00  1.05E-03

 SIGMA - COV MATRIX FOR RANDOM EFFECTS - EPSILONS  ****
         EPS1
 EPS1
+        6.39E-05

 OMEGA - CORR MATRIX FOR RANDOM EFFECTS - ETAS  *******
         ETA1      ETA2      ETA3      ETA4      ETA5
 ETA1
+        1.69E-02
 ETA2
+        4.68E-02  1.84E-02
 ETA3
+       ......... .........  4.15E-03
 ETA4
+       ......... ......... ......... .........
 ETA5
+       ......... ......... ......... ......... .........

 SIGMA - CORR MATRIX FOR RANDOM EFFECTS - EPSILONS  ***
         EPS1
 EPS1
+        6.39E-04
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
 ********************           STOCHASTIC APPROXIMATION EXPECTATION-MAXIMIZATION (NO PRIOR)         ********************
 ********************                    EIGENVALUES OF COR MATRIX OF ESTIMATE (S)                   ********************

             1         2         3         4         5         6         7
         1.50E-01  3.82E-01  5.47E-01  9.28E-01  1.02E+00  1.63E+00  2.34E+00
 #TBLN:      3
 #METH: Objective Function Evaluation by Importance Sampling (No Prior)
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
 #TERM:
 EXPECTATION ONLY PROCESS WAS NOT COMPLETED

 ETABAR IS THE ARITHMETIC MEAN OF THE ETA-ESTIMATES,
 AND THE P-VALUE IS GIVEN FOR THE NULL HYPOTHESIS THAT THE TRUE MEAN IS 0.

 ETABAR:        -1.3216E-04 -3.7096E-04 -6.9619E-03  2.7080E-03  4.1422E-03
 SE:             2.3578E-02  2.1927E-02  6.6341E-03  6.6188E-03  6.8489E-03
 N:                     250         250         250         250         250

 P VAL.:         9.9553E-01  9.8650E-01  2.9399E-01  6.8244E-01  5.4531E-01

 ETASHRINKSD(%)  7.6289E-02  2.2034E+00  1.6995E+01  1.7341E+01  1.4433E+01
 ETASHRINKVR(%)  1.5252E-01  4.3582E+00  3.1101E+01  3.1674E+01  2.6783E+01
 EBVSHRINKSD(%)  1.3900E-01  2.0824E+00  1.7931E+01  1.8036E+01  1.7978E+01
 EBVSHRINKVR(%)  2.7781E-01  4.1215E+00  3.2646E+01  3.2819E+01  3.2723E+01
 RELATIVEINF(%)  9.8889E+01  1.0000E-10  1.0000E-10  1.0000E-10  1.0000E-10
 EPSSHRINKSD(%)  1.4054E+01
 EPSSHRINKVR(%)  2.6133E+01


 TOTAL DATA POINTS NORMALLY DISTRIBUTED (N):         3750
 N*LOG(2PI) CONSTANT TO OBJECTIVE FUNCTION:    6892.03899903504
 OBJECTIVE FUNCTION VALUE WITHOUT CONSTANT:   -19601.2998715247
 OBJECTIVE FUNCTION VALUE WITH CONSTANT:      -12709.2608724897
 REPORTED OBJECTIVE FUNCTION DOES NOT CONTAIN CONSTANT

 TOTAL EFFECTIVE ETAS (NIND*NETA):                          1250


 #TERE:
 Elapsed estimation  time in seconds:   105.30
 Elapsed covariance  time in seconds:    29.31

 ********************         OBJECTIVE FUNCTION EVALUATION BY IMPORTANCE SAMPLING (NO PRIOR)        ********************
 #OBJT:**************                        FINAL VALUE OF OBJECTIVE FUNCTION                       ********************
 #OBJV:********************************************        -19601.300       *********************************************

 ********************         OBJECTIVE FUNCTION EVALUATION BY IMPORTANCE SAMPLING (NO PRIOR)        ********************
 ********************                             FINAL PARAMETER ESTIMATE                           ********************

 THETA - VECTOR OF FIXED EFFECTS PARAMETERS   *********
         TH 1      TH 2
         3.89E+00  3.68E+00

 OMEGA - COV MATRIX FOR RANDOM EFFECTS - ETAS  ********
         ETA1      ETA2      ETA3      ETA4      ETA5
 ETA1
+        1.39E-01
 ETA2
+       -8.13E-02  1.26E-01
 ETA3
+        0.00E+00  0.00E+00  1.60E-02
 ETA4
+        0.00E+00  0.00E+00  0.00E+00  1.60E-02
 ETA5
+        0.00E+00  0.00E+00  0.00E+00  0.00E+00  1.60E-02

 SIGMA - COV MATRIX FOR RANDOM EFFECTS - EPSILONS  ****
         EPS1
 EPS1
+        2.50E-03

 OMEGA - CORR MATRIX FOR RANDOM EFFECTS - ETAS  *******
         ETA1      ETA2      ETA3      ETA4      ETA5
 ETA1
+        3.73E-01
 ETA2
+       -6.15E-01  3.55E-01
 ETA3
+        0.00E+00  0.00E+00  1.27E-01
 ETA4
+        0.00E+00  0.00E+00  0.00E+00  1.27E-01
 ETA5
+        0.00E+00  0.00E+00  0.00E+00  0.00E+00  1.27E-01

 SIGMA - CORR MATRIX FOR RANDOM EFFECTS - EPSILONS  ***
         EPS1
 EPS1
+        5.00E-02

 ********************         OBJECTIVE FUNCTION EVALUATION BY IMPORTANCE SAMPLING (NO PRIOR)        ********************
 ********************                          STANDARD ERROR OF ESTIMATE (R)                        ********************

 THETA - VECTOR OF FIXED EFFECTS PARAMETERS   *********
         TH 1      TH 2
         2.36E-02  2.29E-02

 OMEGA - COV MATRIX FOR RANDOM EFFECTS - ETAS  ********
         ETA1      ETA2      ETA3      ETA4      ETA5
 ETA1
+        1.25E-02
 ETA2
+        1.00E-02  1.18E-02
 ETA3
+        0.00E+00  0.00E+00  9.92E-04
 ETA4
+        0.00E+00  0.00E+00  0.00E+00  9.92E-04
 ETA5
+        0.00E+00  0.00E+00  0.00E+00  0.00E+00  9.92E-04

 SIGMA - COV MATRIX FOR RANDOM EFFECTS - EPSILONS  ****
         EPS1
 EPS1
+        6.73E-05

 OMEGA - CORR MATRIX FOR RANDOM EFFECTS - ETAS  *******
         ETA1      ETA2      ETA3      ETA4      ETA5
 ETA1
+        1.67E-02
 ETA2
+        4.09E-02  1.66E-02
 ETA3
+       ......... .........  3.92E-03
 ETA4
+       ......... ......... ......... .........
 ETA5
+       ......... ......... ......... ......... .........

 SIGMA - CORR MATRIX FOR RANDOM EFFECTS - EPSILONS  ***
         EPS1
 EPS1
+        6.73E-04
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
 ********************         OBJECTIVE FUNCTION EVALUATION BY IMPORTANCE SAMPLING (NO PRIOR)        ********************
 ********************                    EIGENVALUES OF COR MATRIX OF ESTIMATE (R)                   ********************

             1         2         3         4         5         6         7
         1.35E-01  4.01E-01  6.36E-01  1.00E+00  1.00E+00  1.60E+00  2.23E+00
 #TBLN:      4
 #METH: MCMC Bayesian Analysis
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 Elapsed burn-in time in seconds:   163.69
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
 #TERM:
 BURN-IN WAS COMPLETED
 STATISTICAL PORTION WAS COMPLETED

 ETABAR IS THE ARITHMETIC MEAN OF THE ETA-ESTIMATES,
 AND THE P-VALUE IS GIVEN FOR THE NULL HYPOTHESIS THAT THE TRUE MEAN IS 0.

 ETABAR:         3.6021E-04 -6.7085E-05 -5.9889E-03  3.7958E-03  5.2379E-03
 SE:             2.3586E-02  2.1774E-02  6.6482E-03  6.6423E-03  6.9206E-03
 N:                     250         250         250         250         250

 P VAL.:         9.8781E-01  9.9754E-01  3.6768E-01  5.6769E-01  4.4913E-01

 ETASHRINKSD(%)  7.7694E-01  2.9047E+00  1.9680E+01  1.9829E+01  1.6429E+01
 ETASHRINKVR(%)  1.5478E+00  5.7250E+00  3.5487E+01  3.5725E+01  3.0160E+01
 EBVSHRINKSD(%)  1.3721E-01  2.2484E+00  1.8086E+01  1.8183E+01  1.8112E+01
 EBVSHRINKVR(%)  2.7424E-01  4.4462E+00  3.2901E+01  3.3060E+01  3.2944E+01
 RELATIVEINF(%)  9.9451E+01  1.0000E-10  1.0000E-10  1.0000E-10  1.0000E-10
 EPSSHRINKSD(%)  1.4163E+01
 EPSSHRINKVR(%)  2.6321E+01


 TOTAL DATA POINTS NORMALLY DISTRIBUTED (N):         3750
 N*LOG(2PI) CONSTANT TO OBJECTIVE FUNCTION:    6892.03899903504
 OBJECTIVE FUNCTION VALUE WITHOUT CONSTANT:   -28217.3547380622
 OBJECTIVE FUNCTION VALUE WITH CONSTANT:      -21325.3157390272
 REPORTED OBJECTIVE FUNCTION DOES NOT CONTAIN CONSTANT

 TOTAL EFFECTIVE ETAS (NIND*NETA):                          1250
 NIND*NETA*LOG(2PI) CONSTANT TO OBJECTIVE FUNCTION:    2297.34633301168
 OBJECTIVE FUNCTION VALUE WITHOUT CONSTANT:   -28217.3547380622
 OBJECTIVE FUNCTION VALUE WITH CONSTANT:      -25920.0084050505
 REPORTED OBJECTIVE FUNCTION DOES NOT CONTAIN CONSTANT

 PRIOR CONSTANT TO OBJECTIVE FUNCTION:    16.3289195783656
 OBJECTIVE FUNCTION VALUE WITHOUT CONSTANT:   -28217.3547380622
 OBJECTIVE FUNCTION VALUE WITH CONSTANT:      -28201.0258184838
 REPORTED OBJECTIVE FUNCTION DOES NOT CONTAIN CONSTANT


 #TERE:
 Elapsed estimation  time in seconds:  1845.34
 Elapsed covariance  time in seconds:     0.00

 ********************                              MCMC BAYESIAN ANALYSIS                            ********************
 #OBJT:**************                       AVERAGE VALUE OF LIKELIHOOD FUNCTION                     ********************
 #OBJV:********************************************        -28217.355       *********************************************
 #OBJS:********************************************            59.971 (STD) *********************************************

 ********************                              MCMC BAYESIAN ANALYSIS                            ********************
 ********************                             FINAL PARAMETER ESTIMATE                           ********************

 THETA - VECTOR OF FIXED EFFECTS PARAMETERS   *********
         TH 1      TH 2
         3.89E+00  3.68E+00

 OMEGA - COV MATRIX FOR RANDOM EFFECTS - ETAS  ********
         ETA1      ETA2      ETA3      ETA4      ETA5
 ETA1
+        1.41E-01
 ETA2
+       -8.07E-02  1.26E-01
 ETA3
+        0.00E+00  0.00E+00  1.72E-02
 ETA4
+        0.00E+00  0.00E+00  0.00E+00  1.72E-02
 ETA5
+        0.00E+00  0.00E+00  0.00E+00  0.00E+00  1.72E-02

 SIGMA - COV MATRIX FOR RANDOM EFFECTS - EPSILONS  ****
         EPS1
 EPS1
+        2.50E-03

 OMEGA - CORR MATRIX FOR RANDOM EFFECTS - ETAS  *******
         ETA1      ETA2      ETA3      ETA4      ETA5
 ETA1
+        3.75E-01
 ETA2
+       -6.04E-01  3.54E-01
 ETA3
+        0.00E+00  0.00E+00  1.31E-01
 ETA4
+        0.00E+00  0.00E+00  0.00E+00  1.31E-01
 ETA5
+        0.00E+00  0.00E+00  0.00E+00  0.00E+00  1.31E-01

 SIGMA - CORR MATRIX FOR RANDOM EFFECTS - EPSILONS  ***
         EPS1
 EPS1
+        5.00E-02

 ********************                              MCMC BAYESIAN ANALYSIS                            ********************
 ********************                STANDARD ERROR OF ESTIMATE (From Sample Variance)               ********************

 THETA - VECTOR OF FIXED EFFECTS PARAMETERS   *********
         TH 1      TH 2
         2.35E-02  2.26E-02

 OMEGA - COV MATRIX FOR RANDOM EFFECTS - ETAS  ********
         ETA1      ETA2      ETA3      ETA4      ETA5
 ETA1
+        1.28E-02
 ETA2
+        1.01E-02  1.19E-02
 ETA3
+        0.00E+00  0.00E+00  1.13E-03
 ETA4
+        0.00E+00  0.00E+00  0.00E+00  1.13E-03
 ETA5
+        0.00E+00  0.00E+00  0.00E+00  0.00E+00  1.13E-03

 SIGMA - COV MATRIX FOR RANDOM EFFECTS - EPSILONS  ****
         EPS1
 EPS1
+        6.79E-05

 OMEGA - CORR MATRIX FOR RANDOM EFFECTS - ETAS  *******
         ETA1      ETA2      ETA3      ETA4      ETA5
 ETA1
+        1.70E-02
 ETA2
+        4.17E-02  1.67E-02
 ETA3
+        0.00E+00  0.00E+00  4.29E-03
 ETA4
+        0.00E+00  0.00E+00  0.00E+00  4.29E-03
 ETA5
+        0.00E+00  0.00E+00  0.00E+00  0.00E+00  4.29E-03

 SIGMA - CORR MATRIX FOR RANDOM EFFECTS - EPSILONS  ***
         EPS1
 EPS1
+        6.79E-04
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
 ********************                              MCMC BAYESIAN ANALYSIS                            ********************
 ********************           EIGENVALUES OF COR MATRIX OF ESTIMATE (From Sample Variance)         ********************

             1         2         3         4         5         6         7
         1.39E-01  4.27E-01  6.39E-01  9.96E-01  1.01E+00  1.57E+00  2.22E+00
 #TBLN:      5
 #METH: First Order Conditional Estimation with Interaction (No Prior)
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
 #TERM:
0MINIMIZATION SUCCESSFUL
 HOWEVER, PROBLEMS OCCURRED WITH THE MINIMIZATION.
 REGARD THE RESULTS OF THE ESTIMATION STEP CAREFULLY, AND ACCEPT THEM ONLY
 AFTER CHECKING THAT THE COVARIANCE STEP PRODUCES REASONABLE OUTPUT.
 NO. OF FUNCTION EVALUATIONS USED:      280
 NO. OF SIG. DIGITS IN FINAL EST.:  3.0

 ETABAR IS THE ARITHMETIC MEAN OF THE ETA-ESTIMATES,
 AND THE P-VALUE IS GIVEN FOR THE NULL HYPOTHESIS THAT THE TRUE MEAN IS 0.

 ETABAR:        -6.2740E-04  1.0661E-04 -6.7122E-03  2.5885E-03  4.0688E-03
 SE:             2.3551E-02  2.1838E-02  6.6359E-03  6.6176E-03  6.8554E-03
 N:                     250         250         250         250         250

 P VAL.:         9.7875E-01  9.9610E-01  3.1178E-01  6.9568E-01  5.5283E-01

 ETASHRINKSD(%)  2.4530E-01  2.2382E+00  1.8683E+01  1.9048E+01  1.6106E+01
 ETASHRINKVR(%)  4.9000E-01  4.4263E+00  3.3876E+01  3.4468E+01  2.9618E+01
 EBVSHRINKSD(%)  1.3874E-01  2.1762E+00  1.7839E+01  1.7937E+01  1.7858E+01
 EBVSHRINKVR(%)  2.7729E-01  4.3051E+00  3.2496E+01  3.2656E+01  3.2527E+01
 RELATIVEINF(%)  1.0000E+02  0.0000E+00  0.0000E+00  0.0000E+00  0.0000E+00
 EPSSHRINKSD(%)  1.4071E+01
 EPSSHRINKVR(%)  2.6162E+01


 TOTAL DATA POINTS NORMALLY DISTRIBUTED (N):         3750
 N*LOG(2PI) CONSTANT TO OBJECTIVE FUNCTION:    6892.03899903504
 OBJECTIVE FUNCTION VALUE WITHOUT CONSTANT:   -19599.6349196520
 OBJECTIVE FUNCTION VALUE WITH CONSTANT:      -12707.5959206169
 REPORTED OBJECTIVE FUNCTION DOES NOT CONTAIN CONSTANT

 TOTAL EFFECTIVE ETAS (NIND*NETA):                          1250


 #TERE:
 Elapsed estimation  time in seconds:    89.62
 Elapsed covariance  time in seconds:    15.41
 Elapsed postprocess time in seconds:     0.00

 ********************          FIRST ORDER CONDITIONAL ESTIMATION WITH INTERACTION (NO PRIOR)        ********************
 #OBJT:**************                       MINIMUM VALUE OF OBJECTIVE FUNCTION                      ********************
 #OBJV:********************************************        -19599.635       *********************************************

 ********************          FIRST ORDER CONDITIONAL ESTIMATION WITH INTERACTION (NO PRIOR)        ********************
 ********************                             FINAL PARAMETER ESTIMATE                           ********************

 THETA - VECTOR OF FIXED EFFECTS PARAMETERS   *********
         TH 1      TH 2
         3.89E+00  3.68E+00

 OMEGA - COV MATRIX FOR RANDOM EFFECTS - ETAS  ********
         ETA1      ETA2      ETA3      ETA4      ETA5
 ETA1
+        1.39E-01
 ETA2
+       -8.06E-02  1.25E-01
 ETA3
+        0.00E+00  0.00E+00  1.67E-02
 ETA4
+        0.00E+00  0.00E+00  0.00E+00  1.67E-02
 ETA5
+        0.00E+00  0.00E+00  0.00E+00  0.00E+00  1.67E-02

 SIGMA - COV MATRIX FOR RANDOM EFFECTS - EPSILONS  ****
         EPS1
 EPS1
+        2.50E-03

 OMEGA - CORR MATRIX FOR RANDOM EFFECTS - ETAS  *******
         ETA1      ETA2      ETA3      ETA4      ETA5
 ETA1
+        3.73E-01
 ETA2
+       -6.12E-01  3.53E-01
 ETA3
+        0.00E+00  0.00E+00  1.29E-01
 ETA4
+        0.00E+00  0.00E+00  0.00E+00  1.29E-01
 ETA5
+        0.00E+00  0.00E+00  0.00E+00  0.00E+00  1.29E-01

 SIGMA - CORR MATRIX FOR RANDOM EFFECTS - EPSILONS  ***
         EPS1
 EPS1
+        5.00E-02

 ********************          FIRST ORDER CONDITIONAL ESTIMATION WITH INTERACTION (NO PRIOR)        ********************
 ********************                            STANDARD ERROR OF ESTIMATE                          ********************

 THETA - VECTOR OF FIXED EFFECTS PARAMETERS   *********
         TH 1      TH 2
         2.36E-02  2.29E-02

 OMEGA - COV MATRIX FOR RANDOM EFFECTS - ETAS  ********
         ETA1      ETA2      ETA3      ETA4      ETA5
 ETA1
+        1.25E-02
 ETA2
+        9.95E-03  1.17E-02
 ETA3
+       ......... .........  1.08E-03
 ETA4
+       ......... ......... ......... .........
 ETA5
+       ......... ......... ......... ......... .........

 SIGMA - COV MATRIX FOR RANDOM EFFECTS - EPSILONS  ****
         EPS1
 EPS1
+        6.76E-05

 OMEGA - CORR MATRIX FOR RANDOM EFFECTS - ETAS  *******
         ETA1      ETA2      ETA3      ETA4      ETA5
 ETA1
+        1.67E-02
 ETA2
+        4.12E-02  1.65E-02
 ETA3
+       ......... .........  4.16E-03
 ETA4
+       ......... ......... ......... .........
 ETA5
+       ......... ......... ......... ......... .........

 SIGMA - CORR MATRIX FOR RANDOM EFFECTS - EPSILONS  ***
         EPS1
 EPS1
+        6.75E-04
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
 ********************          FIRST ORDER CONDITIONAL ESTIMATION WITH INTERACTION (NO PRIOR)        ********************
 ********************                      EIGENVALUES OF COR MATRIX OF ESTIMATE                     ********************

             1         2         3         4         5         6         7
         1.39E-01  4.04E-01  6.44E-01  9.96E-01  1.01E+00  1.60E+00  2.22E+00
 Elapsed finaloutput time in seconds:     0.02
 #CPUT: Total CPU Time in Seconds,     2377.469
