Tue 10/22/2024
02:30 PM
;Model Desc: Two compartment Model, Using ADVAN3, TRANS4
;Project Name: nm7examples
;Project ID: NO PROJECT DESCRIPTION

$PROB RUN# Example 8 (from samp5l)
$INPUT C SET ID JID TIME  DV=CONC AMT=DOSE RATE EVID MDV CMT
       CLX V1X QX V2X SDIX SDSX
$DATA example8.csv IGNORE=C

$SUBROUTINES ADVAN3 TRANS4

$PK
include nonmem_reserved_general
; Request extra information for Bayesian analysis.
; An extra call will then be made for accepted samples
BAYES_EXTRA_REQUEST=1
MU_1=THETA(1)
MU_2=THETA(2)
MU_3=THETA(3)
MU_4=THETA(4)
CL=DEXP(MU_1+ETA(1))
V1=DEXP(MU_2+ETA(2))
Q=DEXP(MU_3+ETA(3))
V2=DEXP(MU_4+ETA(4))
S1=V1
; When Bayes_extra=1, then this particular set of individual
; parameters were "accepted" So you may record them if you wish
  IF(BAYES_EXTRA==1 .AND. ITER_REPORT>=0 .AND. TIME==0.0) THEN
"  WRITE(51,98) ITER_REPORT,ID,CL,V1,Q,V2
" 98 FORMAT(I12,1X,F14.0,4(1X,1PG12.5))
ENDIF

$ERROR
include nonmem_reserved_general
BAYES_EXTRA_REQUEST=1
Y = F + F*EPS(1)
IF(BAYES_EXTRA==1 .AND. ITER_REPORT>=0 ) THEN
" WRITE(52,97) ITER_REPORT,ID,TIME,F
" 97 FORMAT(I12,1X,F14.0,2(1X,1PG12.5))
ENDIF

; Initial values of THETA
$THETA
(2.0) ;[LN(CL)]
(2.0) ;[LN(V1)]
(2.0) ;[LN(Q)]
(2.0) ;[LN(V2)]
;INITIAL values of OMEGA
$OMEGA BLOCK(4)
0.15   ;[P]
0.01  ;[F]
0.15   ;[P]
0.01  ;[F]
0.01  ;[F]
0.15   ;[P]
0.01  ;[F]
0.01  ;[F]
0.01  ;[F]
0.15   ;[P]
;Initial value of SIGMA
$SIGMA
(0.6 )   ;[P]

$PRIOR NWPRI
; Prior information to the Thetas.
$THETAP (2.0 FIX)x4
$THETAPV BLOCK(4) FIX VALUES(10000.0,0.0)

; Prior information to the OMEGAS.
$OMEGAP BLOCK(4)
0.2 FIX
0.0  0.2
0.0  0.0 0.2
0.0  0.0 0.0 0.2
$OMEGAPD (4 FIX)

$EST METHOD=BAYES INTERACTION FILE=example8.ext NBURN=10000
     NITER=1000 PRINT=100 NOPRIOR=0 CTYPE=3 CINTERVAL=100

NM-TRAN MESSAGES
 WARNINGS AND ERRORS (IF ANY) FOR PROBLEM    1
 (WARNING  2) NM-TRAN INFERS THAT THE DATA ARE POPULATION.
 (MU_WARNING 20) MU_001: MU_ VARIABLE SHOULD NOT BE DEFINED AFTER VERBATIM CODE.
Note: Analytical 2nd Derivatives are constructed in FSUBS but are never used.
      You may insert $ABBR DERIV2=NO after the first $PROB to save FSUBS construction and compilation time

1NONLINEAR MIXED EFFECTS MODEL PROGRAM (NONMEM) VERSION 7.6.0 beta 4 (nm76b4)
 ORIGINALLY DEVELOPED BY STUART BEAL, LEWIS SHEINER, AND ALISON BOECKMANN
 CURRENT DEVELOPERS ARE ROBERT BAUER, ICON DEVELOPMENT SOLUTIONS,
 AND ALISON BOECKMANN. IMPLEMENTATION, EFFICIENCY, AND STANDARDIZATION
 PERFORMED BY NOUS INFOSYSTEMS.
 PROBLEM NO.:         1
 RUN# Example 8 (from samp5l)
 TOT. NO. OF OBS RECS:      500
 TOT. NO. OF INDIVIDUALS:      100
 TWO COMPARTMENT MODEL (ADVAN3)
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 #TBLN:      1
 #METH: MCMC Bayesian Analysis
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 Elapsed burn-in time in seconds:    25.82
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
 #TERM:
 BURN-IN WAS COMPLETED
 STATISTICAL PORTION WAS COMPLETED

 ETABAR IS THE ARITHMETIC MEAN OF THE ETA-ESTIMATES,
 AND THE P-VALUE IS GIVEN FOR THE NULL HYPOTHESIS THAT THE TRUE MEAN IS 0.

 ETABAR:        -3.9558E-03 -1.6248E-03 -7.8417E-04 -1.3187E-03
 SE:             3.8956E-02  2.7571E-02  2.9262E-02  3.1508E-02
 N:                     100         100         100         100

 P VAL.:         9.1912E-01  9.5300E-01  9.7862E-01  9.6661E-01

 ETASHRINKSD(%)  6.5661E+00  2.7148E+01  3.2353E+01  2.0259E+01
 ETASHRINKVR(%)  1.2701E+01  4.6927E+01  5.4239E+01  3.6414E+01
 EBVSHRINKSD(%)  3.5694E+00  2.4030E+01  2.9453E+01  1.6802E+01
 EBVSHRINKVR(%)  7.0113E+00  4.2285E+01  5.0231E+01  3.0781E+01
 RELATIVEINF(%)  8.7943E+01  5.6636E+01  4.5309E+01  6.0482E+01
 EPSSHRINKSD(%)  2.9974E+01
 EPSSHRINKVR(%)  5.0964E+01


 TOTAL DATA POINTS NORMALLY DISTRIBUTED (N):          500
 N*LOG(2PI) CONSTANT TO OBJECTIVE FUNCTION:    918.938533204673
 OBJECTIVE FUNCTION VALUE WITHOUT CONSTANT:   -2307.07065024074
 OBJECTIVE FUNCTION VALUE WITH CONSTANT:      -1388.13211703607
 REPORTED OBJECTIVE FUNCTION DOES NOT CONTAIN CONSTANT

 TOTAL EFFECTIVE ETAS (NIND*NETA):                           400
 NIND*NETA*LOG(2PI) CONSTANT TO OBJECTIVE FUNCTION:    735.150826563738
 OBJECTIVE FUNCTION VALUE WITHOUT CONSTANT:   -2307.07065024074
 OBJECTIVE FUNCTION VALUE WITH CONSTANT:      -1571.91982367701
 REPORTED OBJECTIVE FUNCTION DOES NOT CONTAIN CONSTANT

 PRIOR CONSTANT TO OBJECTIVE FUNCTION:    66.6250661892040
 OBJECTIVE FUNCTION VALUE WITHOUT CONSTANT:   -2307.07065024074
 OBJECTIVE FUNCTION VALUE WITH CONSTANT:      -2240.44558405154
 REPORTED OBJECTIVE FUNCTION DOES NOT CONTAIN CONSTANT


 #TERE:
 Elapsed estimation  time in seconds:    63.58
 Elapsed covariance  time in seconds:     0.00

 ********************                              MCMC BAYESIAN ANALYSIS                            ********************
 #OBJT:**************                       AVERAGE VALUE OF LIKELIHOOD FUNCTION                     ********************
 #OBJV:********************************************         -2307.071       *********************************************
 #OBJS:********************************************            44.418 (STD) *********************************************

 ********************                              MCMC BAYESIAN ANALYSIS                            ********************
 ********************                             FINAL PARAMETER ESTIMATE                           ********************

 THETA - VECTOR OF FIXED EFFECTS PARAMETERS   *********
         TH 1      TH 2      TH 3      TH 4
         1.64E+00  1.56E+00  7.52E-01  2.35E+00

 OMEGA - COV MATRIX FOR RANDOM EFFECTS - ETAS  ********
         ETA1      ETA2      ETA3      ETA4
 ETA1
+        1.74E-01
 ETA2
+       -4.95E-03  1.43E-01
 ETA3
+        7.89E-03 -7.57E-03  1.87E-01
 ETA4
+       -2.05E-02  9.10E-03  2.06E-02  1.56E-01

 SIGMA - COV MATRIX FOR RANDOM EFFECTS - EPSILONS  ****
         EPS1
 EPS1
+        6.06E-02

 OMEGA - CORR MATRIX FOR RANDOM EFFECTS - ETAS  *******
         ETA1      ETA2      ETA3      ETA4
 ETA1
+        4.16E-01
 ETA2
+       -3.49E-02  3.76E-01
 ETA3
+        3.49E-02 -5.14E-02  4.27E-01
 ETA4
+       -1.31E-01  5.46E-02  9.63E-02  3.92E-01

 SIGMA - CORR MATRIX FOR RANDOM EFFECTS - EPSILONS  ***
         EPS1
 EPS1
+        2.46E-01

 ********************                              MCMC BAYESIAN ANALYSIS                            ********************
 ********************                STANDARD ERROR OF ESTIMATE (From Sample Variance)               ********************

 THETA - VECTOR OF FIXED EFFECTS PARAMETERS   *********
         TH 1      TH 2      TH 3      TH 4
         4.46E-02  5.04E-02  7.13E-02  5.42E-02

 OMEGA - COV MATRIX FOR RANDOM EFFECTS - ETAS  ********
         ETA1      ETA2      ETA3      ETA4
 ETA1
+        2.82E-02
 ETA2
+        2.26E-02  3.16E-02
 ETA3
+        2.91E-02  3.31E-02  6.11E-02
 ETA4
+        2.31E-02  2.44E-02  3.38E-02  3.69E-02

 SIGMA - COV MATRIX FOR RANDOM EFFECTS - EPSILONS  ****
         EPS1
 EPS1
+        7.48E-03

 OMEGA - CORR MATRIX FOR RANDOM EFFECTS - ETAS  *******
         ETA1      ETA2      ETA3      ETA4
 ETA1
+        3.34E-02
 ETA2
+        1.41E-01  4.15E-02
 ETA3
+        1.55E-01  1.99E-01  6.93E-02
 ETA4
+        1.42E-01  1.57E-01  1.78E-01  4.60E-02

 SIGMA - CORR MATRIX FOR RANDOM EFFECTS - EPSILONS  ***
         EPS1
 EPS1
+        1.52E-02

 ********************                              MCMC BAYESIAN ANALYSIS                            ********************
 ********************               COVARIANCE MATRIX OF ESTIMATE (From Sample Variance)             ********************

            TH 1      TH 2      TH 3      TH 4      OM11      OM12      OM13      OM14      OM22      OM23      OM24      OM33
             OM34      OM44      SG11
 TH 1
+        1.99E-03
 TH 2
+        2.00E-04  2.54E-03
 TH 3
+        4.70E-04  1.87E-04  5.09E-03
 TH 4
+        1.76E-04  3.74E-04  1.87E-03  2.94E-03
 OM11
+       -3.18E-05  8.85E-05  1.47E-04  8.80E-05  7.98E-04
 OM12
+        2.43E-05  1.43E-04  2.25E-04  8.82E-05  6.66E-05  5.11E-04
 OM13
+        1.01E-05  1.57E-04  4.69E-05  9.52E-05  2.04E-04  1.08E-04  8.49E-04
 OM14
+        5.22E-05  2.56E-05  2.58E-04  1.06E-04  5.99E-05  1.21E-04  3.20E-04  5.35E-04
 OM22
+        3.35E-05 -8.36E-05 -1.36E-04  3.59E-05 -1.76E-05  5.85E-05 -2.59E-05  1.06E-05  9.98E-04
 OM23
+       -1.80E-05  1.21E-04  5.39E-04  8.63E-05  2.56E-05  1.47E-04  7.18E-05  1.06E-04 -4.24E-05  1.10E-03
 OM24
+       -2.29E-05  3.07E-07  1.89E-04  9.65E-05 -1.10E-05  3.88E-05 -4.97E-06  6.03E-05  1.60E-04  2.71E-04  5.97E-04
 OM33
+        2.66E-05  3.16E-06  2.84E-04  1.06E-04  2.02E-04  2.87E-04  5.63E-04  3.37E-04  8.34E-05  2.43E-04  6.31E-05  3.74E-03
 OM34
+        5.02E-05 -5.37E-06  1.41E-04 -2.63E-05  4.63E-05  1.31E-04  1.75E-04  1.77E-04  3.40E-05  2.34E-04  9.85E-05  1.26E-03
          1.14E-03
 OM44
+        5.54E-05  1.15E-04  9.99E-05  1.23E-04  1.84E-05  1.20E-04  1.10E-04  9.62E-05  7.93E-05  1.69E-04  2.38E-04  6.42E-04
          6.79E-04  1.36E-03
 SG11
+       -2.44E-06  3.17E-05  1.12E-07 -5.00E-06 -1.65E-05 -1.81E-05 -2.36E-05 -1.77E-05 -4.62E-05 -7.64E-06 -2.09E-05 -1.50E-04
         -7.35E-05 -8.11E-05  5.60E-05

 ********************                              MCMC BAYESIAN ANALYSIS                            ********************
 ********************              CORRELATION MATRIX OF ESTIMATE (From Sample Variance)             ********************

            TH 1      TH 2      TH 3      TH 4      OM11      OM12      OM13      OM14      OM22      OM23      OM24      OM33
             OM34      OM44      SG11
 TH 1
+        4.46E-02
 TH 2
+        8.89E-02  5.04E-02
 TH 3
+        1.48E-01  5.21E-02  7.13E-02
 TH 4
+        7.27E-02  1.37E-01  4.83E-01  5.42E-02
 OM11
+       -2.52E-02  6.22E-02  7.31E-02  5.74E-02  2.82E-02
 OM12
+        2.41E-02  1.25E-01  1.40E-01  7.19E-02  1.04E-01  2.26E-02
 OM13
+        7.78E-03  1.07E-01  2.26E-02  6.02E-02  2.48E-01  1.65E-01  2.91E-02
 OM14
+        5.06E-02  2.20E-02  1.57E-01  8.44E-02  9.17E-02  2.31E-01  4.75E-01  2.31E-02
 OM22
+        2.38E-02 -5.26E-02 -6.03E-02  2.10E-02 -1.97E-02  8.20E-02 -2.81E-02  1.45E-02  3.16E-02
 OM23
+       -1.21E-02  7.26E-02  2.28E-01  4.80E-02  2.73E-02  1.96E-01  7.44E-02  1.38E-01 -4.04E-02  3.31E-02
 OM24
+       -2.10E-02  2.49E-04  1.08E-01  7.28E-02 -1.59E-02  7.02E-02 -6.98E-03  1.07E-01  2.07E-01  3.34E-01  2.44E-02
 OM33
+        9.73E-03  1.03E-03  6.52E-02  3.20E-02  1.17E-01  2.08E-01  3.16E-01  2.38E-01  4.32E-02  1.20E-01  4.22E-02  6.11E-02
 OM34
+        3.33E-02 -3.16E-03  5.86E-02 -1.43E-02  4.85E-02  1.71E-01  1.78E-01  2.27E-01  3.18E-02  2.09E-01  1.19E-01  6.09E-01
          3.38E-02
 OM44
+        3.37E-02  6.17E-02  3.80E-02  6.13E-02  1.77E-02  1.44E-01  1.03E-01  1.13E-01  6.81E-02  1.38E-01  2.65E-01  2.85E-01
          5.44E-01  3.69E-02
 SG11
+       -7.31E-03  8.40E-02  2.10E-04 -1.23E-02 -7.79E-02 -1.07E-01 -1.08E-01 -1.02E-01 -1.96E-01 -3.08E-02 -1.14E-01 -3.27E-01
         -2.90E-01 -2.94E-01  7.48E-03
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 Elapsed postprocess time in seconds:     0.00
 Elapsed finaloutput time in seconds:     0.00
 #CPUT: Total CPU Time in Seconds,       63.453
