Tue 10/22/2024
02:31 PM
;Model Desc: Two compartment Model, Using ADVAN3, TRANS4
;Project Name: nm7examples
;Project ID: NO PROJECT DESCRIPTION

$PROB RUN# Example 9 (from samp5l)
$INPUT C SET ID JID TIME  DV=CONC AMT=DOSE RATE EVID MDV CMT CLX V1X QX V2X SDIX SDSX
$DATA example9.csv IGNORE=C

$SUBROUTINES ADVAN3 TRANS4 OTHER=aneal.f90

$PK
MU_1=THETA(1)
MU_2=THETA(2)
MU_3=THETA(3)
MU_4=THETA(4)
CL=DEXP(MU_1+ETA(1))
V1=DEXP(MU_2+ETA(2))
Q=DEXP(MU_3+ETA(3))
V2=DEXP(MU_4+ETA(4))
S1=V1

$ERROR
Y = F + F*EPS(1)

; Initial values of THETA
$THETA
(0.001, 2.0) ;[LN(CL)]
(0.001, 2.0) ;[LN(V1)]
(0.001, 2.0) ;[LN(Q)]
(0.001, 2.0) ;[LN(V2)]
;INITIAL values of OMEGA
$OMEGA BLOCK(4)
0.05   ;[P]
0.01  ;[F]
0.05   ;[P]
0.01  ;[F]
0.01  ;[F]
0.05   ;[P]
0.01  ;[F]
0.01  ;[F]
0.01  ;[F]
0.05   ;[P]
;Initial value of SIGMA
$SIGMA
(0.6 )   ;[P]

$EST METHOD=SAEM INTERACTION FILE=example9.ext NBURN=5000 NITER=500 PRINT=10 NOABORT SIGL=6
    CTYPE=3 CINTERVAL=100 CITER=10 CALPHA=0.05

NM-TRAN MESSAGES
 WARNINGS AND ERRORS (IF ANY) FOR PROBLEM    1
 (WARNING  2) NM-TRAN INFERS THAT THE DATA ARE POPULATION.
Note: Analytical 2nd Derivatives are constructed in FSUBS but are never used.
      You may insert $ABBR DERIV2=NO after the first $PROB to save FSUBS construction and compilation time

1NONLINEAR MIXED EFFECTS MODEL PROGRAM (NONMEM) VERSION 7.6.0 beta 4 (nm76b4)
 ORIGINALLY DEVELOPED BY STUART BEAL, LEWIS SHEINER, AND ALISON BOECKMANN
 CURRENT DEVELOPERS ARE ROBERT BAUER, ICON DEVELOPMENT SOLUTIONS,
 AND ALISON BOECKMANN. IMPLEMENTATION, EFFICIENCY, AND STANDARDIZATION
 PERFORMED BY NOUS INFOSYSTEMS.
 PROBLEM NO.:         1
 RUN# Example 9 (from samp5l)
 TOT. NO. OF OBS RECS:      500
 TOT. NO. OF INDIVIDUALS:      100
 TWO COMPARTMENT MODEL (ADVAN3)
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 #TBLN:      1
 #METH: Stochastic Approximation Expectation-Maximization
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 Elapsed burn-in time in seconds:    49.75
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
 #TERM:
 STOCHASTIC PORTION WAS COMPLETED
 REDUCED STOCHASTIC PORTION WAS COMPLETED

 ETABAR IS THE ARITHMETIC MEAN OF THE ETA-ESTIMATES,
 AND THE P-VALUE IS GIVEN FOR THE NULL HYPOTHESIS THAT THE TRUE MEAN IS 0.

 ETABAR:        -8.6391E-06 -4.7532E-05 -4.7020E-06  1.8191E-05
 SE:             3.8766E-02  2.9018E-02  2.9368E-02  3.2191E-02
 N:                     100         100         100         100

 P VAL.:         9.9982E-01  9.9869E-01  9.9987E-01  9.9955E-01

 ETASHRINKSD(%)  3.4702E+00  2.2678E+01  2.8837E+01  1.6145E+01
 ETASHRINKVR(%)  6.8200E+00  4.0214E+01  4.9358E+01  2.9684E+01
 EBVSHRINKSD(%)  3.4743E+00  2.2673E+01  2.8827E+01  1.6143E+01
 EBVSHRINKVR(%)  6.8279E+00  4.0205E+01  4.9345E+01  2.9680E+01
 RELATIVEINF(%)  8.8133E+01  5.8405E+01  4.6648E+01  6.2319E+01
 EPSSHRINKSD(%)  2.9439E+01
 EPSSHRINKVR(%)  5.0211E+01


 TOTAL DATA POINTS NORMALLY DISTRIBUTED (N):          500
 N*LOG(2PI) CONSTANT TO OBJECTIVE FUNCTION:    918.938533204673
 OBJECTIVE FUNCTION VALUE WITHOUT CONSTANT:   -2493.02547326576
 OBJECTIVE FUNCTION VALUE WITH CONSTANT:      -1574.08694006109
 REPORTED OBJECTIVE FUNCTION DOES NOT CONTAIN CONSTANT

 TOTAL EFFECTIVE ETAS (NIND*NETA):                           400
 NIND*NETA*LOG(2PI) CONSTANT TO OBJECTIVE FUNCTION:    735.150826563738
 OBJECTIVE FUNCTION VALUE WITHOUT CONSTANT:   -2493.02547326576
 OBJECTIVE FUNCTION VALUE WITH CONSTANT:      -1757.87464670203
 REPORTED OBJECTIVE FUNCTION DOES NOT CONTAIN CONSTANT


 #TERE:
 Elapsed estimation  time in seconds:    72.93

 ********************                STOCHASTIC APPROXIMATION EXPECTATION-MAXIMIZATION               ********************
 #OBJT:**************                        FINAL VALUE OF LIKELIHOOD FUNCTION                      ********************
 #OBJV:********************************************         -2493.025       *********************************************

 ********************                STOCHASTIC APPROXIMATION EXPECTATION-MAXIMIZATION               ********************
 ********************                             FINAL PARAMETER ESTIMATE                           ********************

 THETA - VECTOR OF FIXED EFFECTS PARAMETERS   *********
         TH 1      TH 2      TH 3      TH 4
         1.63E+00  1.55E+00  7.36E-01  2.34E+00

 OMEGA - COV MATRIX FOR RANDOM EFFECTS - ETAS  ********
         ETA1      ETA2      ETA3      ETA4
 ETA1
+        1.61E-01
 ETA2
+       -7.31E-03  1.41E-01
 ETA3
+        7.29E-03 -1.47E-02  1.70E-01
 ETA4
+       -2.21E-02  8.68E-03  1.91E-02  1.47E-01

 SIGMA - COV MATRIX FOR RANDOM EFFECTS - EPSILONS  ****
         EPS1
 EPS1
+        5.73E-02

 OMEGA - CORR MATRIX FOR RANDOM EFFECTS - ETAS  *******
         ETA1      ETA2      ETA3      ETA4
 ETA1
+        4.02E-01
 ETA2
+       -4.85E-02  3.75E-01
 ETA3
+        4.40E-02 -9.46E-02  4.13E-01
 ETA4
+       -1.43E-01  6.02E-02  1.21E-01  3.84E-01

 SIGMA - CORR MATRIX FOR RANDOM EFFECTS - EPSILONS  ***
         EPS1
 EPS1
+        2.39E-01
 Elapsed postprocess time in seconds:     0.00
 Elapsed finaloutput time in seconds:     0.00
 #CPUT: Total CPU Time in Seconds,       72.391
